// SBML level 1 version 1
// Created by XMLPrettyPrinter on 11/20/2002
// Model Starts Here

model untitled()

  // Compartments:
  compartment uVol = 1;

  // Species:
  species Kinase1 in uVol = 1/uVol;
  species Kinase1_P in uVol = 0;
  species Kinase2 in uVol = 1/uVol;
  species Kinase2_P in uVol = 0;
  species Enzyme_i in uVol = 1/uVol;
  species Enzyme_a in uVol = 0;
  species M in uVol = 0;
  species $Signal in uVol = 1/uVol;
  species $S in uVol = 10/uVol;
  species $P1 in uVol = 1e-5/uVol;
  species $P2 in uVol = 1e-5/uVol;

  // Reactions:
  J0: Kinase1 => Kinase1_P; V_1*Kinase1/Kms_1/(1+Ka_1/Signal+Kinase1/Kms_1*(1+Ka_1/Signal));
    Kms_1 = 0.001; V_1 = 10; Ka_1 = 0.5;
  J1: Kinase1_P => Kinase1; V_2*Kinase1_P/Km_2/(1+Kinase1_P/Km_2*(1+Signal/Ki_2));
    Km_2 = 0.001; V_2 = 10; Ki_2 = 0.5;
  J2: Kinase2 => Kinase2_P; (((Kinase1_P)*(Kinase2))*(kcat_3))/(Km_3+Kinase2);
    kcat_3 = 10; Km_3 = 0.01;
  J3: Kinase2_P => Kinase2; V_4*Kinase2_P/(Km_4+Kinase2_P);
    Km_4 = 0.1; V_4 = 10;
  J4: Enzyme_i => Enzyme_a; (((Kinase2_P)*(Enzyme_i))*(kcat_5))/(Km_5+Enzyme_i);
    kcat_5 = 1; Km_5 = 0.01;
  J5: Enzyme_a => Enzyme_i; V_6*Enzyme_a/(Km_6+Enzyme_a);
    Km_6 = 1; V_6 = 1;
  J6: $S -> M; Vf_7*S-Vr_7*M/(Kms_7*Kmp_7+Kmp_7*S+Kms_7*M);
    Kms_7 = 1; Kmp_7 = 1; Vf_7 = 100; Vr_7 = 10;
  J7: M -> $P1; ((Enzyme_a)*(((kcatf_8)*(M))/(Kms_8)-((kcatr_8)*(P1))/(Kmp_8)))/(1+(M)/(Kms_8)+(P1)/(Kmp_8));
    kcatf_8 = 2000; Kms_8 = 1; kcatr_8 = 1; Kmp_8 = 1;
  J8: M -> $P2; Vf_9*M-Vr_9*P2/(Kms_9*Kmp_9+Kmp_9*M+Kms_9*P2);
    Kms_9 = 1; Kmp_9 = 1; Vf_9 = 180; Vr_9 = 1;
end
