// SBML level 1 version 1

model Pyruvate_branches_in_Lactococcus_lactis()

  // Compartments:
  compartment compartment = 1;

  // Species:
  species ADP in compartment = 5/compartment;
  species NAD in compartment = 10/compartment;
  species ATP in compartment = 0;
  species NADH in compartment = 0;
  species pyruvate in compartment = 1e-12/compartment;
  species $lactate in compartment = 1/compartment;
  species CoA in compartment = 1/compartment;
  species $halfglucose in compartment = 30/compartment;
  species AcCoA in compartment = 0;
  species $Pi in compartment = 10/compartment;
  species AcP in compartment = 0;
  species $Ac in compartment = 1/compartment;
  species AcO in compartment = 0;
  species $EtOH in compartment = 1/compartment;
  species AcLac in compartment = 0;
  species AcetoinIn in compartment = 0;
  species AcetoinOut in compartment = 0;
  species $Butanediol in compartment = 0.01/compartment;
  species $O2 in compartment = 0.2/compartment;
  species ActoinIn in compartment = 0;

  // Reactions:
  R1: ADP + NAD + $halfglucose => ATP + NADH + pyruvate; ((((V_1)*((halfglucose)/(Kglc_1)))*((NAD)/(Knad_1)))*((ADP)/(Kadp_1)))/(((1 +(halfglucose)/(Kglc_1)+(pyruvate)/(Kpyr_1))*(1 +(NAD)/(Knad_1)+(NADH)/(Knadh_1)))*(1 +(ADP)/(Kadp_1)+(ATP)/(Katp_1)));
    V_1 = 2397; Kglc_1 = 0.1; Knad_1 = 0.14; Kadp_1 = 0.047; Kpyr_1 = 25; Knadh_1 = 0.09; Katp_1 = 0.019;
  R2: NADH + pyruvate => NAD + $lactate; ((V_2)*(((pyruvate)*(NADH)-((lactate)*(NAD))/(Keq_2))/((Kpyr_2)*(Knadh_2))))/((1 +(pyruvate)/(Kpyr_2)+(lactate)/(Klac_2))*(1 +(NADH)/(Knadh_2)+(NAD)/(Knad_2)));
    V_2 = 5118; Keq_2 = 21120.7; Kpyr_2 = 1.5; Knadh_2 = 0.08; Klac_2 = 100; Knad_2 = 2.4;
  R3: NAD + pyruvate + CoA => NADH + AcCoA; (((((V_3)*((pyruvate)/(Kpyr_3)))*((NAD)/(Knad_3)))*((CoA)/(Kcoa_3)))*((NAD)/(NAD+(Ki_3)*(NADH))))/(((1 +(pyruvate)/(Kpyr_3))*(1 +(NAD)/(Knad_3)+(NADH)/(Knadh_3)))*(1 +(CoA)/(Kcoa_3)+(AcCoA)/(Kaccoa_3)));
    V_3 = 259; Kpyr_3 = 1; Knad_3 = 0.4; Kcoa_3 = 0.014; Ki_3 = 46.4; Knadh_3 = 0.1; Kaccoa_3 = 0.008;
  R4: AcCoA + $Pi => CoA + AcP; ((V_4)*(((AcCoA)*(Pi)-((AcP)*(CoA))/(Keq_4))/((Kiaccoa_4)*(Kpi_4))))/(1 +(AcCoA)/(Kiaccoa_4)+(Pi)/(Kipi_4)+(AcP)/(Kiacp_4)+(CoA)/(Kicoa_4)+((AcCoA)*(Pi))/((Kiaccoa_4)*(Kpi_4))+((AcP)*(CoA))/((Kacp_4)*(Kicoa_4)));
    V_4 = 42; Keq_4 = 0.0281; Kiaccoa_4 = 0.2; Kpi_4 = 2.6; Kipi_4 = 2.6; Kiacp_4 = 0.2; Kicoa_4 = 0.029; Kacp_4 = 0.7;
  R5: ADP + AcP => ATP + $Ac; ((V_5)*(((AcP)*(ADP)-((Ac)*(ATP))/(Keq_5))/((Kadp_5)*(Kacp_5))))/((1 +(AcP)/(Kacp_5)+(Ac)/(Kac_5))*(1 +(ADP)/(Kadp_5)+(ATP)/(Katp_5)));
    V_5 = 2700; Keq_5 = 174.2; Kadp_5 = 0.5; Kacp_5 = 0.16; Kac_5 = 7; Katp_5 = 0.07;
  R6: NADH + AcCoA => NAD + CoA + AcO; ((V_6)*(((AcCoA)*(NADH)-(((CoA)*(NAD))*(AcO))/(Keq_6))/((Kaccoa_6)*(Knadh_6))))/((1 +(NAD)/(Knad_6)+(NADH)/(Knadh_6))*(1 +(AcCoA)/(Kaccoa_6)+(CoA)/(Kcoa_6)+(AcO)/(Kaco_6)+((AcO)*(CoA))/((Kaco_6)*(Kcoa_6))));
    V_6 = 97; Keq_6 = 1; Kaccoa_6 = 0.007; Knadh_6 = 0.025; Knad_6 = 0.08; Kcoa_6 = 0.008; Kaco_6 = 10;
  R7: NADH + AcO => NAD + $EtOH; ((V_7)*(((AcO)*(NADH)-((EtOH)*(NAD))/(Keq_7))/((Kaco_7)*(Knadh_7))))/((1 +(NAD)/(Knad_7)+(NADH)/(Knadh_7))*(1 +(AcO)/(Kaco_7)+(EtOH)/(Ketoh_7)));
    V_7 = 162; Keq_7 = 12354.9; Kaco_7 = 0.03; Knadh_7 = 0.05; Knad_7 = 0.08; Ketoh_7 = 1;
  R8: pyruvate => 2 AcLac; ((V_8)*((((pyruvate)/(Kpyr_8))*(1 -(AcLac)/((pyruvate)*(Keq_8))))*(((pyruvate)/(Kpyr_8)+(AcLac)/(Kaclac_8))^(n_8-1 ))))/(1 +((pyruvate)/(Kpyr_8)+(AcLac)/(Kaclac_8))^(n_8));
    V_8 = 600; Kpyr_8 = 50; Keq_8 = 9000000000000; Kaclac_8 = 100; n_8 = 2.4;
  R9: AcLac => AcetoinIn; ((V_9)*((AcLac)/(Kaclac_9)))/(1 +(AcLac)/(Kaclac_9)+(AcetoinIn)/(Kacet_9));
    V_9 = 106; Kaclac_9 = 10; Kacet_9 = 100;
  R10: AcetoinIn => AcetoinOut; ((V_10)*((AcetoinIn)/(Kacet_10)))/(1 +(AcetoinIn)/(Kacet_10));
    V_10 = 200; Kacet_10 = 5;
  R11: NADH + AcetoinIn => NAD + $Butanediol; ((V_11)*(((AcetoinIn)*(NADH)-((Butanediol)*(NAD))/(Keq_11))/((Kacet_11)*(Knadh_11))))/((1 +(AcetoinIn)/(Kacet_11)+(Butanediol)/(Kbut_11))*(1 +(NADH)/(Knadh_11)+(NAD)/(Knad_11)));
    V_11 = 105; Keq_11 = 1400; Kacet_11 = 0.06; Knadh_11 = 0.02; Kbut_11 = 2.6; Knad_11 = 0.16;
  R12: ATP => ADP; ((V_12)*(((ATP)/((ADP)*(Katp_12)))^(n_12)))/(1 +((ATP)/((ADP)*(Katp_12)))^(n_12));
    V_12 = 900; Katp_12 = 6.2; n_12 = 2.6;
  R13: NADH + $O2 => NAD; ((V_13)*(((NADH)*(O2))/((Knadh_13)*(Ko_13))))/((1 +(NADH)/(Knadh_13)+(NAD)/(Knad_13))*(1 +(O2)/(Ko_13)));
    V_13 = 118; Knadh_13 = 0.041; Ko_13 = 0.01; Knad_13 = 1;
  R14: AcLac => ActoinIn; k_14*AcLac;
    k_14 = 0.0003;
end
