// SBML level 1 version 1

model Lambeth()

  // Compartments:
  compartment uVol = 1;

  // Species:
  species adp in uVol = 1.3e-5/uVol;
  species NADH in uVol = 5e-7/uVol;
  species atp in uVol = 0.0082/uVol;
  species PCr in uVol = 0.03467/uVol;
  species G1P in uVol = 5e-5/uVol;
  species P in uVol = 0.0041/uVol;
  species G6P in uVol = 0.00075/uVol;
  species F6P in uVol = 0.0002/uVol;
  species FDP in uVol = 7e-5/uVol;
  species DHAP in uVol = 7e-5/uVol;
  species GAP in uVol = 3e-5/uVol;
  species DPG in uVol = 6.5e-5/uVol;
  species P3G in uVol = 5e-5/uVol;
  species P2G in uVol = 5e-6/uVol;
  species LAC in uVol = 0.0013/uVol;
  species Cr in uVol = 0.00533/uVol;
  species amp in uVol = 2e-8/uVol;
  species PEP in uVol = 1e-5/uVol;
  species PYR in uVol = 0.000144/uVol;
  species NAD in uVol = 0.0005/uVol;
  species $Gly in uVol = 0.112/uVol;
  species $LACo in uVol = 0;

  // Reactions:
  vgp: P + $Gly -> G1P; (fracA_1)*(((((Vfgly_1)*(P))*(Gly))/((KgpAigly_1)*(KgpApi_1)))/(1 +(Gly)/(KgpAglyf_1)+(P)/(KgpApi_1)+((Gly)*(P))/((KgpAglyf_1)*(KgpAipi_1))+(Gly)/(KgpAglyb_1)+(G1P)/(KgpAg1p_1)+((Gly)*(G1P))/((KgpAig1p_1)*(KgpAglyb_1)))-(((((((Vfgly_1)*(KgpAglyb_1))*(KgpAig1p_1))/(((KgpAigly_1)*(KgpApi_1))*(0.31 )))*(G1P))*(Gly))/((KgpAglyb_1)*(KgpAig1p_1)))/(1 +(Gly)/(KgpAglyf_1)+(P)/(KgpApi_1)+((Gly)*(P))/((KgpAglyf_1)*(KgpAipi_1))+(Gly)/(KgpAglyb_1)+(G1P)/(KgpAg1p_1)+((Gly)*(G1P))/((KgpAig1p_1)*(KgpAglyb_1))))+(fracB_1)*((((((amp)^(nH_1))/(((Kgpamp_1)^(nH_1))*(0.02 )))/(1 +((amp)^(nH_1))/(((Kgpamp_1)^(nH_1))*(0.02 ))))*((((Vfgly_1)*(P))*(Gly))/((KgpBiglyf_1)*(KgpBpi_1))))/(1 +(Gly)/(KgpBipi_1)+(P)/(KgpBiglyf_1)+(Gly)/(KgpBiglyb_1)+(G1P)/(KgpBig1p_1)+((Gly)*(P))/((KgpBiglyf_1)*(KgpBpi_1))+((Gly)*(G1P))/((KgpBg1p_1)*(KgpBiglyb_1)))-(((((amp)^(nH_1))/(((Kgpamp_1)^(nH_1))*(0.02 )))/(1 +((amp)^(nH_1))/(((Kgpamp_1)^(nH_1))*(0.02 ))))*(((((((Vfgly_1)*(KgpBg1p_1))*(KgpBiglyb_1))/(((KgpBiglyf_1)*(KgpBpi_1))*(0.31 )))*(G1P))*(Gly))/((KgpBg1p_1)*(KgpBiglyb_1))))/(1 +(Gly)/(KgpBipi_1)+(P)/(KgpBiglyf_1)+(Gly)/(KgpBiglyb_1)+(G1P)/(KgpBig1p_1)+((Gly)*(P))/((KgpBiglyf_1)*(KgpBpi_1))+((Gly)*(G1P))/((KgpBg1p_1)*(KgpBiglyb_1))));
    fracA_1 = 0.4; Vfgly_1 = 0.05; KgpAigly_1 = 0.002; KgpApi_1 = 0.004; KgpAglyf_1 = 0.0017; KgpAipi_1 = 0.0047; KgpAglyb_1 = 0.00015; KgpAg1p_1 = 0.0027; KgpAig1p_1 = 0.0101; fracB_1 = 0.6; nH_1 = 1.75; Kgpamp_1 = 9.7e-5; KgpBiglyf_1 = 0.015; KgpBpi_1 = 0.0002; KgpBipi_1 = 0.0046; KgpBiglyb_1 = 0.0044; KgpBig1p_1 = 0.0074; KgpBg1p_1 = 0.0015;
  vpglm: G1P -> G6P; (((Vfpglm_2)*(G1P))/(Kpglmg1p_2)-((((Vfpglm_2)*(Kpglmg6p_2))/((Kpglmg1p_2)*(16.62 )))*(G6P))/(Kpglmg6p_2))/(1 +(G1P)/(Kpglmg1p_2)+(G6P)/(Kpglmg6p_2));
    Vfpglm_2 = 0.48; Kpglmg1p_2 = 6.3e-5; Kpglmg6p_2 = 3e-5;
  vpgi: G6P -> F6P; ((((((Vbpgi_3)*(Kpgig6p_3))/(Kpgif6p_3))*(0.45 ))*(G6P))/(Kpgig6p_3)-((Vbpgi_3)*(F6P))/(Kpgif6p_3))/(1 +(F6P)/(Kpgif6p_3)+(G6P)/(Kpgig6p_3));
    Vbpgi_3 = 0.88; Kpgig6p_3 = 0.00048; Kpgif6p_3 = 0.000119;
  vpfk: atp + F6P -> adp + FDP; ((((Vfpfk_4)*(atp))*(F6P))*(1 +((((((Kpfkatp_4)*(Kpfkf6p_4))*(Lo_4))*((1 +((en_4)*(amp))/(Kpfkamp_4))^(4 )))*((1 +(atp)/(Kpfkiatp_4))^(4 )))*(((1 +(atp)/(KpfkatpT_4))*(1 +(F6P)/(Kpfkf6pT_4))+(FDP)/(KpfkfdpT_4)+((adp)*(1 +(FDP)/(KpfkfdpT_4)))/(KpfkadpT_4))^(3 )))/(((((KpfkatpT_4)*(Kpfkf6pT_4))*((1 +(amp)/(Kpfkamp_4))^(4 )))*((1 +((dn_4)*(atp))/(Kpfkiatp_4))^(4 )))*(((1 +(atp)/(Kpfkatp_4))*(1 +(F6P)/(Kpfkf6p_4))+(FDP)/(Kpfkfdp_4)+((adp)*(1 +(FDP)/(Kpfkfdp_4)))/(Kpfkadp_4))^(3 )))))/((((Kpfkatp_4)*(Kpfkf6p_4))*((1 +(atp)/(Kpfkatp_4))*(1 +(F6P)/(Kpfkf6p_4))+(FDP)/(Kpfkfdp_4)+((adp)*(1 +(FDP)/(Kpfkfdp_4)))/(Kpfkadp_4)))*(1 +((((Lo_4)*((1 +((en_4)*(amp))/(Kpfkamp_4))^(4 )))*((1 +(atp)/(Kpfkiatp_4))^(4 )))*(((1 +(atp)/(KpfkatpT_4))*(1 +(F6P)/(Kpfkf6pT_4))+(FDP)/(KpfkfdpT_4)+((adp)*(1 +(FDP)/(KpfkfdpT_4)))/(KpfkadpT_4))^(4 )))/((((1 +(amp)/(Kpfkamp_4))^(4 ))*((1 +((dn_4)*(atp))/(Kpfkiatp_4))^(4 )))*(((1 +(atp)/(Kpfkatp_4))*(1 +(F6P)/(Kpfkf6p_4))+(FDP)/(Kpfkfdp_4)+((adp)*(1 +(FDP)/(Kpfkfdp_4)))/(Kpfkadp_4))^(4 )))))-(((((0.00411743 )*(Vfpfk_4))*(adp))*(FDP))*(1 +((((((Kpfkatp_4)*(Kpfkf6p_4))*(Lo_4))*((1 +((en_4)*(amp))/(Kpfkamp_4))^(4 )))*((1 +(atp)/(Kpfkiatp_4))^(4 )))*(((1 +(atp)/(KpfkatpT_4))*(1 +(F6P)/(Kpfkf6pT_4))+(FDP)/(KpfkfdpT_4)+((adp)*(1 +(FDP)/(KpfkfdpT_4)))/(KpfkadpT_4))^(3 )))/(((((KpfkatpT_4)*(Kpfkf6pT_4))*((1 +(amp)/(Kpfkamp_4))^(4 )))*((1 +((dn_4)*(atp))/(Kpfkiatp_4))^(4 )))*(((1 +(atp)/(Kpfkatp_4))*(1 +(F6P)/(Kpfkf6p_4))+(FDP)/(Kpfkfdp_4)+((adp)*(1 +(FDP)/(Kpfkfdp_4)))/(Kpfkadp_4))^(3 )))))/((((Kpfkatp_4)*(Kpfkf6p_4))*((1 +(atp)/(Kpfkatp_4))*(1 +(F6P)/(Kpfkf6p_4))+(FDP)/(Kpfkfdp_4)+((adp)*(1 +(FDP)/(Kpfkfdp_4)))/(Kpfkadp_4)))*(1 +((((Lo_4)*((1 +((en_4)*(amp))/(Kpfkamp_4))^(4 )))*((1 +(atp)/(Kpfkiatp_4))^(4 )))*(((1 +(atp)/(KpfkatpT_4))*(1 +(F6P)/(Kpfkf6pT_4))+(FDP)/(KpfkfdpT_4)+((adp)*(1 +(FDP)/(KpfkfdpT_4)))/(KpfkadpT_4))^(4 )))/((((1 +(amp)/(Kpfkamp_4))^(4 ))*((1 +((dn_4)*(atp))/(Kpfkiatp_4))^(4 )))*(((1 +(atp)/(Kpfkatp_4))*(1 +(F6P)/(Kpfkf6p_4))+(FDP)/(Kpfkfdp_4)+((adp)*(1 +(FDP)/(Kpfkfdp_4)))/(Kpfkadp_4))^(4 )))));
    Vfpfk_4 = 0.056; Kpfkatp_4 = 8e-5; Kpfkf6p_4 = 0.00018; Lo_4 = 13; en_4 = 0.01; Kpfkamp_4 = 6e-5; Kpfkiatp_4 = 0.00087; KpfkatpT_4 = 0.00025; Kpfkf6pT_4 = 0.02; KpfkfdpT_4 = 0.0042; KpfkadpT_4 = 0.00271; dn_4 = 0.01; Kpfkfdp_4 = 0.0042; Kpfkadp_4 = 0.00271;
  vald: FDP -> DHAP + GAP; (((Vfald_5)*(FDP))/(Kaldfdp_5)-((((((Vfald_5)*(Kaldgap_5))*(Kalddhap_5))/((Kaldfdp_5)*(9.5e-005 )))*(DHAP))*(GAP))/((Kaldgap_5)*(Kalddhap_5)))/(1 +(FDP)/(Kaldfdp_5)+(GAP)/(Kaldgap_5)+(DHAP)/(Kalddhap_5));
    Vfald_5 = 0.104; Kaldfdp_5 = 0.0005; Kaldgap_5 = 0.001; Kalddhap_5 = 0.002;
  vtpi: GAP -> DHAP; (((Vftpi_6)*(GAP))/(Ktpigap_6)-((((Vftpi_6)*(Ktpidhap_6))/((Ktpigap_6)*(19.2 )))*(DHAP))/(Ktpidhap_6))/(1 +(GAP)/(Ktpigap_6)+(DHAP)/(Ktpidhap_6));
    Vftpi_6 = 12; Ktpigap_6 = 0.00032; Ktpidhap_6 = 0.00061;
  vgapdh: P + GAP + NAD -> NADH + DPG; (((((-(11.236 ))*(Vfgad_7))*(DPG))*(NADH))/(((Kgapdhgap_7)*(Kgapdhnad_7))*(Kgapdhpi_7))+((((Vfgad_7)*(GAP))*(NAD))*(P))/(((Kgapdhgap_7)*(Kgapdhnad_7))*(Kgapdhpi_7)))/(1 +(DPG)/(Kgapdh13dpg_7)+(GAP)/(Kgapdhgap_7)+(NAD)/(Kgapdhnad_7)+((GAP)*(NAD))/((Kgapdhgap_7)*(Kgapdhnad_7))+(NADH)/(Kgapdhnadh_7)+((DPG)*(NADH))/((Kgapdh13dpg_7)*(Kgapdhnadh_7))+(P)/(Kgapdhpi_7)+(((GAP)*(NAD))*(P))/(((Kgapdhgap_7)*(Kgapdhnad_7))*(Kgapdhpi_7)));
    Vfgad_7 = 1.65; Kgapdhgap_7 = 2.5e-6; Kgapdhnad_7 = 9e-5; Kgapdhpi_7 = 0.00029; Kgapdh13dpg_7 = 8e-7; Kgapdhnadh_7 = 3.3e-6;
  vpgk: adp + DPG -> atp + P3G; (((((57109 )*(Vbpgk_8))*(adp))*(DPG))/((Kpgk3pg_8)*(Kpgkatp_8))-(((Vbpgk_8)*(atp))*(P3G))/((Kpgk3pg_8)*(Kpgkatp_8)))/(1 +(adp)/(Kpgkadp_8)+(atp)/(Kpgkatp_8)+(DPG)/(Kpgk13dpg_8)+((adp)*(DPG))/((Kpgk13dpg_8)*(Kpgkadp_8))+(P3G)/(Kpgk3pg_8)+((atp)*(P3G))/((Kpgk3pg_8)*(Kpgkatp_8)));
    Vbpgk_8 = 1.12; Kpgk3pg_8 = 0.0012; Kpgkatp_8 = 0.00035; Kpgkadp_8 = 8.3e-5; Kpgk13dpg_8 = 1.9e-6;
  vpgm: P3G -> P2G; (((Vfpgm_9)*(P3G))/(Kpgm3pg_9)-((((Vfpgm_9)*(Kpgm2pg_9))/((Kpgm3pg_9)*(0.18 )))*(P2G))/(Kpgm2pg_9))/(1 +(P3G)/(Kpgm3pg_9)+(P2G)/(Kpgm2pg_9));
    Vfpgm_9 = 1.12; Kpgm3pg_9 = 0.0002; Kpgm2pg_9 = 1.4e-5;
  ven: P2G -> PEP; (((Vfen_10)*(P2G))/(Ken2pg_10)-((((Vfen_10)*(Kenpep_10))/((Ken2pg_10)*(0.49 )))*(PEP))/(Kenpep_10))/(1 +(P2G)/(Ken2pg_10)+(PEP)/(Kenpep_10));
    Vfen_10 = 0.192; Ken2pg_10 = 0.0001; Kenpep_10 = 0.00037;
  vpk: adp + PEP -> atp + PYR; ((((Vfpk_11)*(PEP))*(adp))/((Kpkpep_11)*(Kpkadp_11))-((((((Vfpk_11)*(Kpkpyr_11))*(Kpkatp_11))/(((Kpkpep_11)*(Kpkadp_11))*(10304 )))*(PYR))*(atp))/((Kpkpyr_11)*(Kpkatp_11)))/(1 +(PEP)/(Kpkpep_11)+(adp)/(Kpkadp_11)+((PEP)*(adp))/((Kpkpep_11)*(Kpkadp_11))+(atp)/(Kpkatp_11)+(PYR)/(Kpkpyr_11)+((PYR)*(atp))/((Kpkpyr_11)*(Kpkatp_11)));
    Vfpk_11 = 1.44; Kpkpep_11 = 8e-5; Kpkadp_11 = 0.0003; Kpkpyr_11 = 0.00705; Kpkatp_11 = 0.00113;
  vldh: NADH + PYR -> LAC + NAD; ((((Vfldh_12)*(PYR))*(NADH))/((Kldhpyr_12)*(Kldhnadh_12))-((((((Vfldh_12)*(Kldhlac_12))*(Kldhnad_12))/(((Kldhpyr_12)*(Kldhnadh_12))*(16198 )))*(LAC))*(NAD))/((Kldhlac_12)*(Kldhnad_12)))/(1 +(PYR)/(Kldhpyr_12)+(NADH)/(Kldhnadh_12)+((PYR)*(NADH))/((Kldhpyr_12)*(Kldhnadh_12))+(LAC)/(Kldhlac_12)+(NAD)/(Kldhnad_12)+((LAC)*(NAD))/((Kldhlac_12)*(Kldhnad_12)));
    Vfldh_12 = 1.92; Kldhpyr_12 = 0.000335; Kldhnadh_12 = 2.167e-6; Kldhlac_12 = 0.01717; Kldhnad_12 = 0.000849;
  vck: atp + Cr -> adp + PCr; ((((VrevCK_13)*(atp))*(Cr))/((Kckiatp_13)*(Kckcr_13))-(((((VrevCK_13)*(KeqCK_13))/(((Kckiatp_13)*(Kckcr_13))/((Kckiadp_13)*(KckPCr_13))))*(adp))*(PCr))/((Kckiadp_13)*(KckPCr_13)))/(1 +(adp)/(Kckiadp_13)+(PCr)/(KckiPCr_13)+((PCr)*(adp))/((Kckiadp_13)*(KckPCr_13))+(atp)/(Kckiatp_13)+((Cr)*(atp))/((Kckcr_13)*(Kckiatp_13)));
    VrevCK_13 = 0.5; Kckiatp_13 = 0.0035; Kckcr_13 = 0.0038; KeqCK_13 = 233; Kckiadp_13 = 0.000135; KckPCr_13 = 0.00111; KckiPCr_13 = 0.0039;
  vadk: atp + amp -> 2 adp; ((((Vfadk_14)*(atp))*(amp))/((Kadkatp_14)*(Kadkamp_14))-(((Vfadk_14)*((Kadkadp_14)^(2 )))/(((Kadkamp_14)*(Kadkatp_14))*(2.21 )))*(((adp)/(Kadkadp_14))^(2 )))/(1 +(atp)/(Kadkatp_14)+(amp)/(Kadkamp_14)+((atp)*(amp))/((Kadkatp_14)*(Kadkamp_14))+((2 )*(adp))/(Kadkadp_14)+((adp)^(2 ))/((Kadkadp_14)^(2 )));
    Vfadk_14 = 0.88; Kadkatp_14 = 0.00027; Kadkamp_14 = 0.00032; Kadkadp_14 = 0.00035;
  vatpase: atp -> adp + P; (k_15)*(atp);
    k_15 = 0.075;
  vfout: LAC -> $LACo; (kout_16)*(LAC);
    kout_16 = 0.2;
end
