// SBML level 1 version 1

model LeloupGoldbeter()

  // Compartments:
  compartment compartment = 1;

  // Species:
  species $AA in compartment = 1/compartment;
  species P0 in compartment = 0;
  species T0 in compartment = 0;
  species P1 in compartment = 0;
  species T1 in compartment = 0;
  species P2 in compartment = 0;
  species T2 in compartment = 0;
  species C in compartment = 0;
  species Cn in compartment = 0;
  species $NN in compartment = 1/compartment;
  species Mp in compartment = 0;
  species Mt in compartment = 0;

  // Reactions:
  P0_to_P1: P0 => P1; V_1*P0/(Km_1+P0);
    Km_1 = 2; V_1 = 8;
  T0_to_T1: T0 => T1; V_2*T0/(Km_2+T0);
    Km_2 = 2; V_2 = 8;
  P1_to_P0: P1 => P0; V_3*P1/(Km_3+P1);
    Km_3 = 2; V_3 = 1;
  T1_to_T0: T1 => T0; V_4*T1/(Km_4+T1);
    Km_4 = 2; V_4 = 1;
  P1_to_T2: P1 => P2; V_5*P1/(Km_5+P1);
    Km_5 = 2; V_5 = 8;
  T1_to_T2: T1 => T2; V_6*T1/(Km_6+T1);
    Km_6 = 2; V_6 = 8;
  P2_to_P1: P2 => P1; V_7*P2/(Km_7+P2);
    Km_7 = 2; V_7 = 1;
  T2_to_T1: T2 => T1; V_8*T2/(Km_8+T2);
    Km_8 = 2; V_8 = 1;
  P0_degradation: P0 => $AA; k_9*P0;
    k_9 = 0.01;
  T0_degradation: T0 => $AA; k_10*T0;
    k_10 = 0.01;
  P1_degradation: P1 => $AA; k_11*P1;
    k_11 = 0.01;
  T1_degradation: T1 => $AA; k_12*T1;
    k_12 = 0.01;
  P2_degradation: P2 => $AA; (kd_13)*(P2)+((V_13)*(P2))/(Km_13+P2);
    kd_13 = 0.01; V_13 = 2; Km_13 = 0.2;
  T2_degradation: T2 => $AA; (kd_14)*(T2)+((V_14)*(T2))/(Km_14+T2);
    kd_14 = 0.01; V_14 = 2; Km_14 = 0.2;
  PT_complex_formation: P2 + T2 -> C; k1_15*P2*T2-k2_15*C;
    k1_15 = 1.2; k2_15 = 0.6;
  PT_complex_nucleation: C -> Cn; k1_16*C-k2_16*Cn;
    k1_16 = 0.6; k2_16 = 0.2;
  PT_complex_degradation: C => $AA; k_17*C;
    k_17 = 0.01;
  PTnucl_complex_degradation: Cn => $AA; k_18*Cn;
    k_18 = 0.01;
  Mp_production: $NN => Mp; (((NN)*(V_19))*((K_19)^(n_19)))/((K_19)^(n_19)+(Cn)^(n_19));
    V_19 = 1; K_19 = 1; n_19 = 4;
  Mt_production: $NN => Mt; (((NN)*(V_20))*((K_20)^(n_20)))/((K_20)^(n_20)+(Cn)^(n_20));
    V_20 = 1; K_20 = 1; n_20 = 4;
  P0_production: $AA => P0; ((AA)*(k_21))*(Mp);
    k_21 = 0.9;
  T0_production: $AA => T0; ((AA)*(k_22))*(Mt);
    k_22 = 0.9;
  Mp_degradation: Mp => $NN; (kd_23)*(Mp)+((V_23)*(Mp))/(Km_23+Mp);
    kd_23 = 0.01; V_23 = 0.7; Km_23 = 0.2;
  Mt_degradation: Mt => $NN; (kd_24)*(Mt)+((V_24)*(Mt))/(Km_24+Mt);
    kd_24 = 0.01; V_24 = 0.99; Km_24 = 0.2;
end
