// SBML level 1 version 2

model The_Henri_Michaelis_Menten_mechanism_in_an_open_system()
  // Henri, V. (1902), "Théorie générale de l'action de quelques diastases.",
  // Compt. Rend. Hebd. Acad. Sci. Paris 135, 916-919.
  // Michaelis, L. and Menten, M.L. (1913), "Die kinetik der invertinwirkung.",
  // Biochem. Z. 49, 333-369.

  // Compartments:
  compartment compartment = 1;

  // Species:
  species $S in compartment = 1/compartment;
  species E in compartment = 0.999/compartment;
  species ES in compartment = 0.001/compartment;
  species $P in compartment = 0;

  // Reactions:
  R1: $S + E -> ES; k1_1*S*E-k2_1*ES;
    k1_1 = 1; k2_1 = 1;
  R2: ES => E + $P; k_2*ES;
    k_2 = 1;
end
