// SBML level 1 version 2

model Signal_transduction_cascade()
  // - This is a model of a branched pathway controlled by a signal metabolite
  // through an enzyme cascade.
  // - This simulates a time course and the corresponding steady state when all the
  // enzyme forms are inactive and the concentration of Signal has just been set to 1.
  // Further details in http://gepasi.dbs.aber.ac.uk/metab/signal/signal.html

  // Compartments:
  compartment cell = 1;

  // Species:
  species $Signal in cell = 1/cell;
  species Kinase1 in cell = 1/cell;
  species Kinase1_P in cell = 0;
  species Kinase2 in cell = 1/cell;
  species Kinase2_P in cell = 0;
  species Enzyme_i in cell = 1/cell;
  species Enzyme_a in cell = 0;
  species $S in cell = 10/cell;
  species M in cell = 0;
  species $P1 in cell = 1e-5/cell;
  species $P2 in cell = 1e-5/cell;

  // Reactions:
  Kin1_activation: Kinase1 => Kinase1_P; V_1*Kinase1/Kms_1/(1+Ka_1/Signal+Kinase1/Kms_1*(1+Ka_1/Signal));
    Kms_1 = 0.001; V_1 = 10; Ka_1 = 0.5;
  Kin1_inactivation: Kinase1_P => Kinase1; V_2*Kinase1_P/Km_2/(1+Kinase1_P/Km_2*(1+Signal/Ki_2));
    Km_2 = 0.001; V_2 = 10; Ki_2 = 0.5;
  Kin2_activation: Kinase2 => Kinase2_P; (((Kinase1_P)*(Kinase2))*(kcat_3))/(Km_3+Kinase2);
    kcat_3 = 10; Km_3 = 0.01;
  Kin2_inactivation: Kinase2_P => Kinase2; V_4*Kinase2_P/(Km_4+Kinase2_P);
    Km_4 = 0.1; V_4 = 10;
  Enzyme_activation: Enzyme_i => Enzyme_a; (((Kinase2_P)*(Enzyme_i))*(kcat_5))/(Km_5+Enzyme_i);
    kcat_5 = 1; Km_5 = 0.01;
  Enzyme_inactivation: Enzyme_a => Enzyme_i; V_6*Enzyme_a/(Km_6+Enzyme_a);
    Km_6 = 1; V_6 = 1;
  M_production: $S -> M; Vf_7*S-Vr_7*M/(Kms_7*Kmp_7+Kmp_7*S+Kms_7*M);
    Kms_7 = 1; Kmp_7 = 1; Vf_7 = 100; Vr_7 = 10;
  P1_formation: M -> $P1; ((Enzyme_a)*(((kcatf_8)*(M))/(Kms_8)-((kcatr_8)*(P1))/(Kmp_8)))/(1 +(M)/(Kms_8)+(P1)/(Kmp_8));
    kcatf_8 = 2000; Kms_8 = 1; kcatr_8 = 1; Kmp_8 = 1;
  P2_formation: M -> $P2; Vf_9*M-Vr_9*P2/(Kms_9*Kmp_9+Kmp_9*M+Kms_9*P2);
    Kms_9 = 1; Kmp_9 = 1; Vf_9 = 180; Vr_9 = 1;
end
