// SBML level 1 version 2

model Smallest_chemical_reaction_system_with_Hopf_bifurcation()
  // Wilhelm, T. & Heinrich, R. (1995) "Smallest chemical reaction system with
  // Hopf bifurcation" J. Math. Chem. 17, 1-14

  // Compartments:
  compartment compartment = 1;

  // Species:
  species X in compartment = 2.5/compartment;
  species $A in compartment = 1/compartment;
  species Y in compartment = 2.5/compartment;
  species Z in compartment = 2.5/compartment;
  species $_void_ in compartment = 0;

  // Reactions:
  R1: X + $A => 2 X; k_1*X*A;
    k_1 = 3.2;
  R2: X + Y => $A + Y; k_2*X*Y;
    k_2 = 1;
  R3: X => Z; k_3*X;
    k_3 = 1;
  R4: Z => Y; k_4*Z;
    k_4 = 1;
  R5: Y => $_void_; k_5*Y;
    k_5 = 1;
end
