// SBML level 1 version 2
// Created by XMLPrettyPrinter on 12/12/2002
// Model Starts Here

model untitled()

  // Compartments:
  compartment uVol = 1;

  // Species:
  species lacI0 in uVol = 0.6/uVol;
  species lacI1 in uVol = 0;
  species tetR0 in uVol = 0.7/uVol;
  species tetR1 in uVol = 0;
  species cI0 in uVol = 0.8/uVol;
  species cI1 in uVol = 0;
  species cIp in uVol = 0;
  species lacIp in uVol = 0;
  species tetRp in uVol = 0;
  species lacIr in uVol = 0;
  species tetRr in uVol = 0;
  species cIr in uVol = 0;
  species $Waste_6 in uVol = 0;
  species $Waste_1 in uVol = 0;
  species $Waste_2 in uVol = 0;
  species $Waste_3 in uVol = 0;
  species $Waste_4 in uVol = 0;
  species $Waste_5 in uVol = 0;

  // Reactions:
  J0: lacI0 -> lacI1; k1_1*lacI0-k2_1*lacI1;
    k1_1 = 0.01; k2_1 = 0;
  J1: tetR0 -> tetR1; k1_2*tetR0-k2_2*tetR1;
    k1_2 = 0.01; k2_2 = 0;
  J2: cI0 -> cI1; k1_3*cI0-k2_3*cI1;
    k1_3 = 0.02; k2_3 = 0;
  J3: lacI1 + cIp -> lacI0; k1_4*lacI1*cIp-k2_4*lacI0;
    k1_4 = 2; k2_4 = 0.05;
  J4: tetR1 + lacIp -> tetR0; k1_5*tetR1*lacIp-k2_5*tetR0;
    k1_5 = 2.5; k2_5 = 0.05;
  J5: cI1 + tetRp -> cI0; k1_6*cI1*tetRp-k2_6*cI0;
    k1_6 = 2; k2_6 = 0.05;
  J6: lacI1 -> lacI1 + lacIr; k1_7*lacI1-k2_7*lacI1*lacIr;
    k1_7 = 1; k2_7 = 0;
  J7: tetR1 -> tetR1 + tetRr; k1_8*tetR1-k2_8*tetR1*tetRr;
    k1_8 = 1; k2_8 = 0;
  J8: cI1 -> cI1 + cIr; k1_9*cI1-k2_9*cI1*cIr;
    k1_9 = 1; k2_9 = 0;
  J9: lacIr -> lacIp + lacIr; k1_10*lacIr-k2_10*lacIr*lacIp;
    k1_10 = 0.002; k2_10 = 0;
  J10: tetRr -> tetRp + tetRr; k1_11*tetRr-k2_11*tetRr*tetRp;
    k1_11 = 0.002; k2_11 = 0;
  J11: cIr -> cIp + cIr; k1_12*cIr-k2_12*cIr*cIp;
    k1_12 = 0.002; k2_12 = 0;
  J15: lacIp -> $Waste_6; k1_16*lacIp-k2_16;
    k1_16 = 0.02; k2_16 = 0;
  J18: cIr => $Waste_1; k1_15*cIr-k2_15;
    k1_15 = 0.02; k2_15 = 0;
  J18: cIp => $Waste_2; k1_18*cIp-k2_18;
    k1_18 = 0.02; k2_18 = 0;
  J18: tetRp => $Waste_3; k1_17*tetRp-k2_17;
    k1_17 = 0.02; k2_17 = 0;
  J18: tetRr => $Waste_4; k1_14*tetRr-k2_14;
    k1_14 = 0.02; k2_14 = 0;
  J18: lacIr => $Waste_5; k1_13*lacIr-k2_13;
    k1_13 = 0.02; k2_13 = 0;
end
