// SBML level 1 version 2

model GardnerDolnikCollins()
  // Minimal Mitotic Oscillator with Inhibitor
  // Citation
  // Gardner TS, Dolnik M, Collins JJ (1998) A theory for controlling cell cycle dynamics using a reversibly binding inhibitor. PNAS 95: 14190-14195. http://www.pnas.org/cgi/content/abstract/95/24/14190
  // Description
  // This is a modification of the widely cited ( Goldbeter 1991) minimal (3-variable) model for a mitotic oscillator. The three variables represent Cyclin ( C), inactive cdc-2 Kinase (M) and an active cdc-2 Kinase (X) .Two additional variables Y, Z control the dynamics of the inhibitor.
  // Rate constant Reaction
  // a1 = 0.5 C + Y -> Z
  // a2 = 0.5 Z -> C + Y
  // d1 = 0.05 Y -> EmptySet
  // K1 = 0.005 (hill khalf) Comp[M] -> M
  // K2 = 0.005 (hill khalf) M -> EmptySet
  // K3 = 0.005 (hill khalf) Comp[X] -> X
  // K4 = 0.005 (hill khalf) X -> EmptySet
  // Kc = 0.3 (hill vmax) Comp[M] -> M
  // kd = 0.01 C -> EmptySet
  // kd = 0.01 (hill khalf) C + X -> X + EmptySet
  // V2 = 1.5 (hill vmax) M -> EmptySet
  // V4 = 0.5 (hill vmax) X -> EmptySet
  // vd = 0.25 (hill vmax) C + X -> X + EmptySet
  // vi = 0.025 EmptySet -> C
  // VM1 = 3 (hill vmax) Comp[M] -> M
  // VM3 = 1 (hill vmax) Comp[X] -> X
  // VS = 0 EmptySet -> Y
  // alpha = 0.1 Z -> C
  // alpha = 0.1 Z -> Y
  // Variable IC ODE
  // C 0 C'[t] == vi - kd*C[t] - (vd*C[t]*X[t])/( kd + C[t]) - a1*C[t]*Y[t] + a2*Z[t] + alpha* Z[t]
  // M 0 M'[t] == (VM1*C[t]*(1 - M[t]))/((Kc + C[t])*( 1 + K1 - M[t])) - (V2*M[t])/(K2 + M[t])
  // X 0 X'[t] == (VM3*M[t]*(1 - X[t]))/(1 + K3 - X[t]) - (V4*X[t])/(K4 + X[t])
  // Y 1 Y'[t] == VS - d1*Y[t] - a1*C[t]*Y[t] + a2*Z[t] + alpha*Z[t]
  // Z 1 Z'[t] == a1*C[t]*Y[t] - a2*Z[t] - 2*alpha*Z[t]
  // Generated by Cellerator Version 1.0 update 3.0217 using Mathematica 4.2 for Mac OS X (June 4, 2002), February 19, 2003 10:40:59, using (PowerMac,PowerPC, Mac OS X,MacOSX,Darwin)
  // author=B.E.Shapiro

  // Compartments:
  compartment cytoplasm;

  // Species:
  species $EmptySet in cytoplasm = 0;
  species C in cytoplasm = 0;
  species M in cytoplasm = 0;
  species X in cytoplasm = 0;
  species Y in cytoplasm = 1/cytoplasm;
  species Z in cytoplasm = 1/cytoplasm;

  // Reactions:
  Reaction1: $EmptySet => C; vi;
    vi = 0.025;
  Reaction2: C => $EmptySet; C*Reaction2_kd;
    Reaction2_kd = 0.01;
  Reaction3: C => $EmptySet; (C*vd*X)/(C + Reaction3_kd);
    Reaction3_kd = 0.01; vd = 0.25;
  Reaction4: $EmptySet => Y; VS;
    VS = 0;
  Reaction5: Y => $EmptySet; d1*Y;
    d1 = 0.05;
  Reaction6: C + Y => Z; a1*C*Y;
    a1 = 0.5;
  Reaction7: Z => C + Y; a2*Z;
    a2 = 0.5;
  Reaction8: Z => Y; Z*Reaction8_alpha;
    Reaction8_alpha = 0.1;
  Reaction9: Z => C; Z*Reaction9_alpha;
    Reaction9_alpha = 0.1;
  Reaction10: $EmptySet => M; ((1 - M)*VM1*C)/((1 + K1 - M)*(Kc + C));
    K1 = 0.005; Kc = 0.3; VM1 = 3;
  Reaction11: $EmptySet => X; (VM3*(1 - X)*M)/(1 + K3 - X);
    K3 = 0.005; VM3 = 1;
  Reaction12: M => $EmptySet; (M*V2)/(K2 + M);
    K2 = 0.005; V2 = 1.5;
  Reaction13: X => $EmptySet; (V4*X)/(K4 + X);
    K4 = 0.005; V4 = 0.5;
end
