// SBML level 1 version 2
// Author:         Andrew Finney
//   Organisation:   SBMLTeam (http://sbml.org)
//   (C) 2004 - 2005 California Institute of Technology and University of Hertfordshire
//   This is free software;
//   see the file "LICENSE.txt" or the URL http://sbml.org/software/LICENSE.html
//   for licensing and distribution terms.

model basic_model1_stoichiometryIs2()

  // Compartments:
  compartment c = 1;

  // Species:
  species S1 in c = 1.5e-15/c;
  species S2 in c = 1.5e-15/c;

  // Reactions:
  R1: 2 S1 => S2; k_1 * S1;
    k_1 = 0.5;
  R2: S2 => 2 S1; k_2 * S2;
    k_2 = 0.25;
end
