// SBML level 1 version 2
// Author:         Andrew Finney
//   Organisation:   SBMLTeam (http://sbml.org)
//   (C) 2004 - 2005 California Institute of Technology and University of Hertfordshire
//   This is free software;
//   see the file "LICENSE.txt" or the URL http://sbml.org/software/LICENSE.html
//   for licensing and distribution terms.

model basic_model3_boundaryS4()

  // Compartments:
  compartment c = 1;

  // Species:
  species S1 in c = 1e-15/c;
  species S2 in c = 2e-15/c;
  species S3 in c = 1e-15/c;
  species $S4 in c = 1e-15/c;

  // Reactions:
  R1: S1 + S2 => S3 + $S4; kf * S1 * S2;
    kf = 0.75e15;
  R2: S3 + $S4 => S1 + S2; kr * S3 * S4;
    kr = 0.25e15;
end
