// SBML level 1 version 2
// Author:         Andrew Finney
//   Organisation:   SBMLTeam (http://sbml.org)
//   (C) 2004 - 2005 California Institute of Technology and University of Hertfordshire
//   This is free software;
//   see the file "LICENSE.txt" or the URL http://sbml.org/software/LICENSE.html
//   for licensing and distribution terms.

model basicRules_dynamicAssignmentUsedInReaction_Species()

  // Compartments:
  compartment c = 1;

  // Species:
  species $s1 in c;
  species s2 in c = 0;

  // Assignment rules:
  s1 := 0.003 * s2;

  // Reactions:
  r: $s1 -> s2; 0.005 * s1 + 0.01;
end
