// SBML level 1 version 2
// Author:         Andrew Finney
//   Organisation:   SBMLTeam (http://sbml.org)
//   (C) 2004 - 2005 California Institute of Technology and University of Hertfordshire
//   This is free software;
//   see the file "LICENSE.txt" or the URL http://sbml.org/software/LICENSE.html
//   for licensing and distribution terms.

model complexReactions_feedbackCompetitive()

  // Compartments:
  compartment compartment = 1;

  // Species:
  species S1 in compartment = 0;
  species S2 in compartment = 0;
  species S3 in compartment = 0;
  species S4 in compartment = 0;
  species $X0 in compartment = 10/compartment;
  species $X1 in compartment = 0;

  // Reactions:
  J0: $X0 => S1; VM1 * (X0 - S1 / Keq1) / (1 + X0 + S1 + pow(S4, h));
    VM1 = 10; Keq1 = 10; h = 10;
  J1: S1 => S2; (10 * S1 - 2 * S2) / (1 + S1 + S2);
  J2: S2 => S3; (10 * S2 - 2 * S3) / (1 + S2 + S3);
  J3: S3 => S4; (10 * S3 - 2 * S4) / (1 + S3 + S4);
  J4: S4 => $X1; V4 * S4 / (KS4 + S4);
    V4 = 2.5; KS4 = 0.5;
end
