// SBML level 1 version 2
// Author:         Andrew Finney
//   Organisation:   SBMLTeam (http://sbml.org)
//   (C) 2004 - 2005 California Institute of Technology and University of Hertfordshire
//   This is free software;
//   see the file "LICENSE.txt" or the URL http://sbml.org/software/LICENSE.html
//   for licensing and distribution terms.

model complexReactions_hill()

  // Compartments:
  compartment compartment = 1;

  // Species:
  species S1 in compartment = 0;
  species S2 in compartment = 0;
  species S3 in compartment = 0;
  species $S4 in compartment = 0;
  species $S0 in compartment = 5/compartment;

  // Reactions:
  J1: S1 => S2; Vmax * pow(S1, n) / (pow(K, n) + pow(S1, n));
    Vmax = 5.5; n = 4; K = 0.5;
  J2: S2 => S3; J2_k * S2;
    J2_k = 0.1;
  J3: S3 => $S4; J3_k * S3;
    J3_k = 0.1;
  J0: $S0 => S1; J0_k * S0;
    J0_k = 0.01;
end
