// SBML level 1 version 2
// Author:         Andrew Finney
//   Organisation:   SBMLTeam (http://sbml.org)
//   (C) 2004 - 2005 California Institute of Technology and University of Hertfordshire
//   This is free software;
//   see the file "LICENSE.txt" or the URL http://sbml.org/software/LICENSE.html
//   for licensing and distribution terms.

model complexReactions_linearNegFeedback()

  // Compartments:
  compartment compartment = 1;

  // Species:
  species $Substrate in compartment = 100/compartment;
  species Catalyst in compartment = 100/compartment;
  species Complex in compartment = 1/compartment;
  species Product in compartment = 1/compartment;
  species IntermediateProduct1 in compartment = 0;
  species IntermediateProduct2 in compartment = 0;
  species IntermediateProduct3 in compartment = 0;
  species IntermediateProduct4 in compartment = 0;
  species ModifiedProduct in compartment = 0;
  species $Junk in compartment = 100/compartment;
  species SequestrationComplex in compartment = 0;

  // Reactions:
  complexFormation: Catalyst + $Substrate => Complex; kf * Catalyst * Substrate;
    kf = 0.005;
  Catalysis: Complex => Product + Catalyst; kcat * Complex;
    kcat = 0.06;
  productPathway1: Product => IntermediateProduct1; kpath1 * Product;
    kpath1 = 0.003;
  productPathway2: IntermediateProduct1 => IntermediateProduct2; kpath2 * IntermediateProduct1;
    kpath2 = 0.003;
  productPathway3: IntermediateProduct2 => IntermediateProduct3; kpath3 * IntermediateProduct2;
    kpath3 = 0.003;
  productPathway4: IntermediateProduct3 => IntermediateProduct4; kpath4 * IntermediateProduct3;
    kpath4 = 0.003;
  productModification: IntermediateProduct4 => ModifiedProduct; kmod * IntermediateProduct4;
    kmod = 0.003;
  sequestration: Catalyst + ModifiedProduct => SequestrationComplex; kseq * Catalyst * ModifiedProduct;
    kseq = 0.5;
  Unsequestration: SequestrationComplex => ModifiedProduct + Catalyst; kunseq * SequestrationComplex;
    kunseq = 0.01;
  complexSeperation: Complex => $Substrate + Catalyst; kr * Complex;
    kr = 0.01;
  degradation: ModifiedProduct => $Junk; kdeg * ModifiedProduct;
    kdeg = 0.005;
end
