// SBML level 2 version 1
// Author:         Andrew Finney
//   Organisation:   SBMLTeam (http://sbml.org)
//   (C) 2004 - 2005 California Institute of Technology and University of Hertfordshire
//   This is free software;
//   see the file "LICENSE.txt" or the URL http://sbml.org/software/LICENSE.html
//   for licensing and distribution terms.

function f(x, y)
  x + y;
end

model functions_algebraic_rule()

  // Compartments:
  compartment cell = 1;

  // Species:
  species X0 in cell = 1;
  species X1 in cell = 0;
  species T in cell = 0;
  species S1 in cell = 0;
  species S2 in cell;

  // Parameters:
  Keq = 2.5;

  // Assignment rules:
  S2 := Keq*S1;

  // Algebraic rules:
  0 = f(S2, S1) - T;

  // Reactions:
  in: X0 -> T; k1*X0;
    k1 = 0.1;
  out: T -> X1; k2*S2;
    k2 = 0.15;
end
