// SBML level 2 version 1
// Author:         Andrew Finney
//   Organisation:   SBMLTeam (http://sbml.org)
//   (C) 2004 - 2005 California Institute of Technology and University of Hertfordshire
//   This is free software;
//   see the file "LICENSE.txt" or the URL http://sbml.org/software/LICENSE.html
//   for licensing and distribution terms.

function f(x, y)
  x + y;
end

function g(x)
  5*x;
end

model functions_basic_rules()

  // Compartments:
  compartment c = 1;

  // Species:
  species s1 in c;
  species s2 in c = 0;

  // Assignment rules:
  s1 := f(3, 4);

  // Rate rules:
  s2' = g(s1);
end
