// SBML level 2 version 1
// Author:         Andrew Finney
//   Organisation:   SBMLTeam (http://sbml.org)
//   (C) 2004 - 2005 California Institute of Technology and University of Hertfordshire
//   This is free software;
//   see the file "LICENSE.txt" or the URL http://sbml.org/software/LICENSE.html
//   for licensing and distribution terms.
// Generated 11-May-2004 18:34:20.237028
// Generated by MathSBML 2.3.1a (30-April-2004)

function f(x)
  x*10;
end

model functions_stoichiometry()

  // Compartments:
  compartment c1 = 1;

  // Species:
  species A in c1 = 1;
  species B in c1 = 0;

  // Reactions:
  r1: (f(B)) A => B; A*k;
    k = 1;
end
