// SBML level 2 version 1
// Author:         Andrew Finney
//   Organisation:   SBMLTeam (http://sbml.org)
//   (C) 2004 - 2005 California Institute of Technology and University of Hertfordshire
//   This is free software;
//   see the file "LICENSE.txt" or the URL http://sbml.org/software/LICENSE.html
//   for licensing and distribution terms.

model mathml_arctanh()

  // Compartments:
  compartment compartment = 1;

  // Species:
  species S1 in compartment = 1/compartment;
  species S2 in compartment = 0;

  // Parameters:
  p = 1 mol_per_litre;

  // Reactions:
  R: S1 => S2; k_1*arctanh(S1/p*0.5);
    k_1 = 1;

  // Unit definitions:
  unit mol_per_litre = mole / litre;
end
