// SBML level 1 version 1
// Author:         Andrew Finney
//   Organisation:   SBMLTeam (http://sbml.org)
//   (C) 2004 - 2005 California Institute of Technology and University of Hertfordshire
//   This is free software;
//   see the file "LICENSE.txt" or the URL http://sbml.org/software/LICENSE.html
//   for licensing and distribution terms.

model rulesForParametersAndCompartments_assignmentUsedInReaction_Compartment()

  // Compartments:
  compartment c1;
  compartment c2 = 1;

  // Species:
  species $s1 in c2 = 1/c2;
  species s2 in c2 = 0;

  // Assignment rules:
  c1 := s1 * 4;

  // Reactions:
  r: $s1 -> s2; s1;
end
