// SBML level 2 version 1
// Author:         Andrew Finney
//   Organisation:   SBMLTeam (http://sbml.org)
//   (C) 2004 - 2005 California Institute of Technology and University of Hertfordshire
//   This is free software;
//   see the file "LICENSE.txt" or the URL http://sbml.org/software/LICENSE.html
//   for licensing and distribution terms.

model rulesForParametersAndCompartments_differentialUsedInReaction_Compartment()

  // Compartments:
  compartment c = 1;

  // Species:
  species $s1 in c = 0;
  species s2 in c = 0;

  // Parameters:
  p = 1;

  // Rate rules:
  c' = 5;

  // Reactions:
  r: $s1 -> s2; s1*p;
end
