// SBML level 1 version 1

model Linear_pathway_of_isomerisations__open_system_()
  // a -> b -> c -> d -> e -> f
  // all steps follow reversible mass action kinetics, a & f are external metabolites
  // Here we scan the initial concentration of a, and the rate constant of the first
  // step, keeping the equilibrium constant equal to 1 (see links). Follow the
  // progress of the 300 simulations on the Scan page.

  // Compartments:
  compartment compartment = 1;

  // Species:
  species $a in compartment = 1/compartment;
  species b in compartment = 0;
  species c in compartment = 0;
  species d in compartment = 0;
  species e in compartment = 0;
  species $f in compartment = 0.1/compartment;

  // Assignment rules:
  k2_1 := k1_1;

  // Reactions:
  R1: $a -> b; k1_1*a-k2_1*b;
    k1_1 = 1; k2_1 = 2.022876;
  R2: b -> c; k1_2*b-k2_2*c;
    k1_2 = 1; k2_2 = 1;
  R3: c -> d; k1_3*c-k2_3*d;
    k1_3 = 1; k2_3 = 1;
  R4: d -> e; k1_4*d-k2_4*e;
    k1_4 = 1; k2_4 = 1;
  R5: e -> $f; k1_5*e-k2_5*f;
    k1_5 = 1; k2_5 = 1;
end
