// SBML level 1 version 1

model Teusink()

  // Compartments:
  compartment uVol = 1;

  // Species:
  species GLCi in uVol = 0.087/uVol;
  species G6P in uVol = 1.39/uVol;
  species F6P in uVol = 0.28/uVol;
  species F16P in uVol = 0.1/uVol;
  species TRIO in uVol = 5.17/uVol;
  species BPG in uVol = 0;
  species P3G in uVol = 0.1/uVol;
  species P2G in uVol = 0.1/uVol;
  species PEP in uVol = 0.1/uVol;
  species PYR in uVol = 3.36/uVol;
  species ACE in uVol = 0.04/uVol;
  species Pi in uVol = 5/uVol;
  species NAD in uVol = 1.2/uVol;
  species NADH in uVol = 0.39/uVol;
  species $Glyc in uVol = 0;
  species $Trh in uVol = 0;
  species $CO2 in uVol = 1/uVol;
  species $SUCC in uVol = 0;
  species $GLCo in uVol = 50/uVol;
  species $ETOH in uVol = 50/uVol;
  species $GLY in uVol = 0.15/uVol;

  // Reactions:
  vGLK: GLCi + Pi -> G6P; (((VmGLK_1)/((KmGLKGLCi_1)*(KmGLKATP_1)))*((GLCi)*((Pi-((4 )*(KeqAK_1))*(Pi)-SUMAXP_1+((Pi)^(2 )-((4 )*(KeqAK_1))*((Pi)^(2 ))-((2 )*(Pi))*(SUMAXP_1)+(((8 )*(KeqAK_1))*(Pi))*(SUMAXP_1)+(SUMAXP_1)^(2 ))^(0.5 ))/(2 -(8 )*(KeqAK_1)))-(((G6P)*(SUMAXP_1-((Pi)^(2 )-((4 )*(KeqAK_1))*((Pi)^(2 ))-((2 )*(Pi))*(SUMAXP_1)+(((8 )*(KeqAK_1))*(Pi))*(SUMAXP_1)+(SUMAXP_1)^(2 ))^(0.5 )))/(1 -(4 )*(KeqAK_1)))/(KeqGLK_1)))/((1 +(GLCi)/(KmGLKGLCi_1)+(G6P)/(KmGLKG6P_1))*(1 +((Pi-((4 )*(KeqAK_1))*(Pi)-SUMAXP_1+((Pi)^(2 )-((4 )*(KeqAK_1))*((Pi)^(2 ))-((2 )*(Pi))*(SUMAXP_1)+(((8 )*(KeqAK_1))*(Pi))*(SUMAXP_1)+(SUMAXP_1)^(2 ))^(0.5 ))/(2 -(8 )*(KeqAK_1)))/(KmGLKATP_1)+((SUMAXP_1-((Pi)^(2 )-((4 )*(KeqAK_1))*((Pi)^(2 ))-((2 )*(Pi))*(SUMAXP_1)+(((8 )*(KeqAK_1))*(Pi))*(SUMAXP_1)+(SUMAXP_1)^(2 ))^(0.5 ))/(1 -(4 )*(KeqAK_1)))/(KmGLKADP_1)));
    VmGLK_1 = 226.452; KmGLKGLCi_1 = 0.08; KmGLKATP_1 = 0.15; KeqAK_1 = 0.45; SUMAXP_1 = 4.1; KeqGLK_1 = 3800; KmGLKG6P_1 = 30; KmGLKADP_1 = 0.23;
  vPGI: G6P -> F6P; (((VmPGI_2)/(KmPGIG6P_2))*(G6P-(F6P)/(KeqPGI_2)))/(1 +(G6P)/(KmPGIG6P_2)+(F6P)/(KmPGIF6P_2));
    VmPGI_2 = 339.677; KmPGIG6P_2 = 1.4; KeqPGI_2 = 0.314; KmPGIF6P_2 = 0.3;
  vGLYCO: G6P + Pi -> $Glyc; KGLYCOGEN_3;
    KGLYCOGEN_3 = 6;
  vTreha: 2 G6P + Pi -> $Trh; KTREHALOSE_4;
    KTREHALOSE_4 = 2.4;
  vPFK: F6P + Pi -> F16P; (((((VmPFK_5)*(gR_5))*((F6P)/(KmPFKF6P_5)))*(((Pi-((4 )*(KeqAK_5))*(Pi)-SUMAXP_5+((Pi)^(2 )-((4 )*(KeqAK_5))*((Pi)^(2 ))-((2 )*(Pi))*(SUMAXP_5)+(((8 )*(KeqAK_5))*(Pi))*(SUMAXP_5)+(SUMAXP_5)^(2 ))^(0.5 ))/(2 -(8 )*(KeqAK_5)))/(KmPFKATP_5)))*(1 +(F6P)/(KmPFKF6P_5)+((Pi-((4 )*(KeqAK_5))*(Pi)-SUMAXP_5+((Pi)^(2 )-((4 )*(KeqAK_5))*((Pi)^(2 ))-((2 )*(Pi))*(SUMAXP_5)+(((8 )*(KeqAK_5))*(Pi))*(SUMAXP_5)+(SUMAXP_5)^(2 ))^(0.5 ))/(2 -(8 )*(KeqAK_5)))/(KmPFKATP_5)+(((gR_5)*(F6P))/(KmPFKF6P_5))*(((Pi-((4 )*(KeqAK_5))*(Pi)-SUMAXP_5+((Pi)^(2 )-((4 )*(KeqAK_5))*((Pi)^(2 ))-((2 )*(Pi))*(SUMAXP_5)+(((8 )*(KeqAK_5))*(Pi))*(SUMAXP_5)+(SUMAXP_5)^(2 ))^(0.5 ))/(2 -(8 )*(KeqAK_5)))/(KmPFKATP_5))))/((1 +(F6P)/(KmPFKF6P_5)+((Pi-((4 )*(KeqAK_5))*(Pi)-SUMAXP_5+((Pi)^(2 )-((4 )*(KeqAK_5))*((Pi)^(2 ))-((2 )*(Pi))*(SUMAXP_5)+(((8 )*(KeqAK_5))*(Pi))*(SUMAXP_5)+(SUMAXP_5)^(2 ))^(0.5 ))/(2 -(8 )*(KeqAK_5)))/(KmPFKATP_5)+(((gR_5)*(F6P))/(KmPFKF6P_5))*(((Pi-((4 )*(KeqAK_5))*(Pi)-SUMAXP_5+((Pi)^(2 )-((4 )*(KeqAK_5))*((Pi)^(2 ))-((2 )*(Pi))*(SUMAXP_5)+(((8 )*(KeqAK_5))*(Pi))*(SUMAXP_5)+(SUMAXP_5)^(2 ))^(0.5 ))/(2 -(8 )*(KeqAK_5)))/(KmPFKATP_5)))^(2 )+((((Lzero_5)*(((1 +(CiPFKATP_5)*(((Pi-((4 )*(KeqAK_5))*(Pi)-SUMAXP_5+((Pi)^(2 )-((4 )*(KeqAK_5))*((Pi)^(2 ))-((2 )*(Pi))*(SUMAXP_5)+(((8 )*(KeqAK_5))*(Pi))*(SUMAXP_5)+(SUMAXP_5)^(2 ))^(0.5 ))/(2 -(8 )*(KeqAK_5)))/(KiPFKATP_5)))/(1 +((Pi-((4 )*(KeqAK_5))*(Pi)-SUMAXP_5+((Pi)^(2 )-((4 )*(KeqAK_5))*((Pi)^(2 ))-((2 )*(Pi))*(SUMAXP_5)+(((8 )*(KeqAK_5))*(Pi))*(SUMAXP_5)+(SUMAXP_5)^(2 ))^(0.5 ))/(2 -(8 )*(KeqAK_5)))/(KiPFKATP_5)))^(2 )))*(((1 +((CPFKAMP_5)*((((2 )*(KeqAK_5))*((SUMAXP_5-((Pi)^(2 )-((4 )*(KeqAK_5))*((Pi)^(2 ))-((2 )*(Pi))*(SUMAXP_5)+(((8 )*(KeqAK_5))*(Pi))*(SUMAXP_5)+(SUMAXP_5)^(2 ))^(0.5 ))^(2 )))/((-(1 )+(4 )*(KeqAK_5))*(-(Pi)+((4 )*(KeqAK_5))*(Pi)+SUMAXP_5-((Pi)^(2 )-((4 )*(KeqAK_5))*((Pi)^(2 ))-((2 )*(Pi))*(SUMAXP_5)+(((8 )*(KeqAK_5))*(Pi))*(SUMAXP_5)+(SUMAXP_5)^(2 ))^(0.5 )))))/(KPFKAMP_5))/(1 +((((2 )*(KeqAK_5))*((SUMAXP_5-((Pi)^(2 )-((4 )*(KeqAK_5))*((Pi)^(2 ))-((2 )*(Pi))*(SUMAXP_5)+(((8 )*(KeqAK_5))*(Pi))*(SUMAXP_5)+(SUMAXP_5)^(2 ))^(0.5 ))^(2 )))/((-(1 )+(4 )*(KeqAK_5))*(-(Pi)+((4 )*(KeqAK_5))*(Pi)+SUMAXP_5-((Pi)^(2 )-((4 )*(KeqAK_5))*((Pi)^(2 ))-((2 )*(Pi))*(SUMAXP_5)+(((8 )*(KeqAK_5))*(Pi))*(SUMAXP_5)+(SUMAXP_5)^(2 ))^(0.5 ))))/(KPFKAMP_5)))^(2 )))*(((1 +((CPFKF26BP_5)*(F26BP_5))/(KPFKF26BP_5)+((CPFKF16BP_5)*(F16P))/(KPFKF16BP_5))/(1 +(F26BP_5)/(KPFKF26BP_5)+(F16P)/(KPFKF16BP_5)))^(2 )))*((1 +((CPFKATP_5)*((Pi-((4 )*(KeqAK_5))*(Pi)-SUMAXP_5+((Pi)^(2 )-((4 )*(KeqAK_5))*((Pi)^(2 ))-((2 )*(Pi))*(SUMAXP_5)+(((8 )*(KeqAK_5))*(Pi))*(SUMAXP_5)+(SUMAXP_5)^(2 ))^(0.5 ))/(2 -(8 )*(KeqAK_5))))/(KmPFKATP_5))^(2 )));
    VmPFK_5 = 182.903; gR_5 = 5.12; KmPFKF6P_5 = 0.1; KeqAK_5 = 0.45; SUMAXP_5 = 4.1; KmPFKATP_5 = 0.71; Lzero_5 = 0.66; CiPFKATP_5 = 100; KiPFKATP_5 = 0.65; CPFKAMP_5 = 0.0845; KPFKAMP_5 = 0.0995; CPFKF26BP_5 = 0.0174; F26BP_5 = 0.02; KPFKF26BP_5 = 0.000682; CPFKF16BP_5 = 0.397; KPFKF16BP_5 = 0.111; CPFKATP_5 = 3;
  vALD: F16P -> 2 TRIO; (((VmALD_6)/(KmALDF16P_6))*(F16P-((((KeqTPI_6)/(1 +KeqTPI_6))*(TRIO))*(((1 )/(1 +KeqTPI_6))*(TRIO)))/(KeqALD_6)))/(1 +(F16P)/(KmALDF16P_6)+(((KeqTPI_6)/(1 +KeqTPI_6))*(TRIO))/(KmALDGAP_6)+(((1 )/(1 +KeqTPI_6))*(TRIO))/(KmALDDHAP_6)+((((KeqTPI_6)/(1 +KeqTPI_6))*(TRIO))*(((1 )/(1 +KeqTPI_6))*(TRIO)))/((KmALDGAP_6)*(KmALDDHAP_6))+((F16P)*(((KeqTPI_6)/(1 +KeqTPI_6))*(TRIO)))/((KmALDGAPi_6)*(KmALDF16P_6)));
    VmALD_6 = 322.258; KmALDF16P_6 = 0.3; KeqTPI_6 = 0.045; KeqALD_6 = 0.069; KmALDGAP_6 = 2; KmALDDHAP_6 = 2.4; KmALDGAPi_6 = 10;
  vGAPDH: TRIO + NAD -> BPG + NADH; (((VmGAPDHf_7)*((((KeqTPI_7)/(1 +KeqTPI_7))*(TRIO))*(NAD)))/((KmGAPDHGAP_7)*(KmGAPDHNAD_7))-((VmGAPDHr_7)*((BPG)*(NADH)))/((KmGAPDHBPG_7)*(KmGAPDHNADH_7)))/((1 +(((KeqTPI_7)/(1 +KeqTPI_7))*(TRIO))/(KmGAPDHGAP_7)+(BPG)/(KmGAPDHBPG_7))*(1 +(NAD)/(KmGAPDHNAD_7)+(NADH)/(KmGAPDHNADH_7)));
    VmGAPDHf_7 = 1184.52; KeqTPI_7 = 0.045; KmGAPDHGAP_7 = 0.21; KmGAPDHNAD_7 = 0.09; VmGAPDHr_7 = 6549.68; KmGAPDHBPG_7 = 0.0098; KmGAPDHNADH_7 = 0.06;
  vPGK: BPG -> P3G + Pi; (((VmPGK_8)/((KmPGKP3G_8)*(KmPGKATP_8)))*((((KeqPGK_8)*(BPG))*(SUMAXP_8-((Pi)^(2 )-((4 )*(KeqAK_8))*((Pi)^(2 ))-((2 )*(Pi))*(SUMAXP_8)+(((8 )*(KeqAK_8))*(Pi))*(SUMAXP_8)+(SUMAXP_8)^(2 ))^(0.5 )))/(1 -(4 )*(KeqAK_8))-(P3G)*((Pi-((4 )*(KeqAK_8))*(Pi)-SUMAXP_8+((Pi)^(2 )-((4 )*(KeqAK_8))*((Pi)^(2 ))-((2 )*(Pi))*(SUMAXP_8)+(((8 )*(KeqAK_8))*(Pi))*(SUMAXP_8)+(SUMAXP_8)^(2 ))^(0.5 ))/(2 -(8 )*(KeqAK_8)))))/((1 +(BPG)/(KmPGKBPG_8)+(P3G)/(KmPGKP3G_8))*(1 +((Pi-((4 )*(KeqAK_8))*(Pi)-SUMAXP_8+((Pi)^(2 )-((4 )*(KeqAK_8))*((Pi)^(2 ))-((2 )*(Pi))*(SUMAXP_8)+(((8 )*(KeqAK_8))*(Pi))*(SUMAXP_8)+(SUMAXP_8)^(2 ))^(0.5 ))/(2 -(8 )*(KeqAK_8)))/(KmPGKATP_8)+((SUMAXP_8-((Pi)^(2 )-((4 )*(KeqAK_8))*((Pi)^(2 ))-((2 )*(Pi))*(SUMAXP_8)+(((8 )*(KeqAK_8))*(Pi))*(SUMAXP_8)+(SUMAXP_8)^(2 ))^(0.5 ))/(1 -(4 )*(KeqAK_8)))/(KmPGKADP_8)));
    VmPGK_8 = 1306.45; KmPGKP3G_8 = 0.53; KmPGKATP_8 = 0.3; KeqPGK_8 = 3200; SUMAXP_8 = 4.1; KeqAK_8 = 0.45; KmPGKBPG_8 = 0.003; KmPGKADP_8 = 0.2;
  vPGM: P3G -> P2G; (((VmPGM_9)/(KmPGMP3G_9))*(P3G-(P2G)/(KeqPGM_9)))/(1 +(P3G)/(KmPGMP3G_9)+(P2G)/(KmPGMP2G_9));
    VmPGM_9 = 2525.81; KmPGMP3G_9 = 1.2; KeqPGM_9 = 0.19; KmPGMP2G_9 = 0.08;
  vENO: P2G -> PEP; (((VmENO_10)/(KmENOP2G_10))*(P2G-(PEP)/(KeqENO_10)))/(1 +(P2G)/(KmENOP2G_10)+(PEP)/(KmENOPEP_10));
    VmENO_10 = 365.806; KmENOP2G_10 = 0.04; KeqENO_10 = 6.7; KmENOPEP_10 = 0.5;
  vPYK: PEP -> PYR + Pi; (((VmPYK_11)/((KmPYKPEP_11)*(KmPYKADP_11)))*(((PEP)*(SUMAXP_11-((Pi)^(2 )-((4 )*(KeqAK_11))*((Pi)^(2 ))-((2 )*(Pi))*(SUMAXP_11)+(((8 )*(KeqAK_11))*(Pi))*(SUMAXP_11)+(SUMAXP_11)^(2 ))^(0.5 )))/(1 -(4 )*(KeqAK_11))-((PYR)*((Pi-((4 )*(KeqAK_11))*(Pi)-SUMAXP_11+((Pi)^(2 )-((4 )*(KeqAK_11))*((Pi)^(2 ))-((2 )*(Pi))*(SUMAXP_11)+(((8 )*(KeqAK_11))*(Pi))*(SUMAXP_11)+(SUMAXP_11)^(2 ))^(0.5 ))/(2 -(8 )*(KeqAK_11))))/(KeqPYK_11)))/((1 +(PEP)/(KmPYKPEP_11)+(PYR)/(KmPYKPYR_11))*(1 +((Pi-((4 )*(KeqAK_11))*(Pi)-SUMAXP_11+((Pi)^(2 )-((4 )*(KeqAK_11))*((Pi)^(2 ))-((2 )*(Pi))*(SUMAXP_11)+(((8 )*(KeqAK_11))*(Pi))*(SUMAXP_11)+(SUMAXP_11)^(2 ))^(0.5 ))/(2 -(8 )*(KeqAK_11)))/(KmPYKATP_11)+((SUMAXP_11-((Pi)^(2 )-((4 )*(KeqAK_11))*((Pi)^(2 ))-((2 )*(Pi))*(SUMAXP_11)+(((8 )*(KeqAK_11))*(Pi))*(SUMAXP_11)+(SUMAXP_11)^(2 ))^(0.5 ))/(1 -(4 )*(KeqAK_11)))/(KmPYKADP_11)));
    VmPYK_11 = 1088.71; KmPYKPEP_11 = 0.14; KmPYKADP_11 = 0.53; SUMAXP_11 = 4.1; KeqAK_11 = 0.45; KeqPYK_11 = 6500; KmPYKPYR_11 = 21; KmPYKATP_11 = 1.5;
  vPDC: PYR -> ACE + $CO2; ((VmPDC_12)*(((PYR)^(nPDC_12))/((KmPDCPYR_12)^(nPDC_12))))/(1 +((PYR)^(nPDC_12))/((KmPDCPYR_12)^(nPDC_12)));
    VmPDC_12 = 174.194; nPDC_12 = 1.9; KmPDCPYR_12 = 4.33;
  vSUC: 2 ACE + 3 NAD -> 3 NADH + $SUCC; (KSUCC_13)*(ACE);
    KSUCC_13 = 21.4;
  vGLT: $GLCo -> GLCi; (((VmGLT_14)/(KmGLTGLCo_14))*(GLCo-(GLCi)/(KeqGLT_14)))/(1 +(GLCo)/(KmGLTGLCo_14)+(GLCi)/(KmGLTGLCi_14)+(((0.91 )*(GLCo))*(GLCi))/((KmGLTGLCo_14)*(KmGLTGLCi_14)));
    VmGLT_14 = 97.264; KmGLTGLCo_14 = 1.1918; KeqGLT_14 = 1; KmGLTGLCi_14 = 1.1918;
  vADH: ACE + NADH -> NAD + $ETOH; -((((VmADH_15)/((KiADHNAD_15)*(KmADHETOH_15)))*((NAD)*(ETOH)-((NADH)*(ACE))/(KeqADH_15)))/(1 +(NAD)/(KiADHNAD_15)+((KmADHNAD_15)*(ETOH))/((KiADHNAD_15)*(KmADHETOH_15))+((KmADHNADH_15)*(ACE))/((KiADHNADH_15)*(KmADHACE_15))+(NADH)/(KiADHNADH_15)+((NAD)*(ETOH))/((KiADHNAD_15)*(KmADHETOH_15))+(((KmADHNADH_15)*(NAD))*(ACE))/(((KiADHNAD_15)*(KiADHNADH_15))*(KmADHACE_15))+(((KmADHNAD_15)*(ETOH))*(NADH))/(((KiADHNAD_15)*(KmADHETOH_15))*(KiADHNADH_15))+((NADH)*(ACE))/((KiADHNADH_15)*(KmADHACE_15))+(((NAD)*(ETOH))*(ACE))/(((KiADHNAD_15)*(KmADHETOH_15))*(KiADHACE_15))+(((ETOH)*(NADH))*(ACE))/(((KiADHETOH_15)*(KiADHNADH_15))*(KmADHACE_15))));
    VmADH_15 = 810; KiADHNAD_15 = 0.92; KmADHETOH_15 = 17; KeqADH_15 = 6.9e-5; KmADHNAD_15 = 0.17; KmADHNADH_15 = 0.11; KiADHNADH_15 = 0.031; KmADHACE_15 = 1.11; KiADHACE_15 = 1.1; KiADHETOH_15 = 90;
  vG3PDH: TRIO + NADH -> NAD + $GLY; (((VmG3PDH_16)/((KmG3PDHDHAP_16)*(KmG3PDHNADH_16)))*((((1 )/(1 +KeqTPI_16))*(TRIO))*(NADH)-((GLY)*(NAD))/(KeqG3PDH_16)))/((1 +(((1 )/(1 +KeqTPI_16))*(TRIO))/(KmG3PDHDHAP_16)+(GLY)/(KmG3PDHGLY_16))*(1 +(NADH)/(KmG3PDHNADH_16)+(NAD)/(KmG3PDHNAD_16)));
    VmG3PDH_16 = 70.15; KmG3PDHDHAP_16 = 0.4; KmG3PDHNADH_16 = 0.023; KeqTPI_16 = 0.045; KeqG3PDH_16 = 4300; KmG3PDHGLY_16 = 1; KmG3PDHNAD_16 = 0.93;
  vATP: Pi -> $CO2; (KATPASE_17)*((Pi-((4 )*(KeqAK_17))*(Pi)-SUMAXP_17+((Pi)^(2 )-((4 )*(KeqAK_17))*((Pi)^(2 ))-((2 )*(Pi))*(SUMAXP_17)+(((8 )*(KeqAK_17))*(Pi))*(SUMAXP_17)+(SUMAXP_17)^(2 ))^(0.5 ))/(2 -(8 )*(KeqAK_17)));
    KATPASE_17 = 39.5; KeqAK_17 = 0.45; SUMAXP_17 = 4.1;
end
