// SBML level 1 version 2

model Bakker()

  // Compartments:
  compartment uVol = 1;

  // Species:
  species GlcI in uVol = 0.008333621/uVol;
  species Glc6P in uVol = 0.507844749/uVol;
  species Fru6P in uVol = 0.125435562/uVol;
  species Fru16BP in uVol = 4.05324321/uVol;
  species DHAP in uVol = 22.22423/uVol;
  species GAP in uVol = 0.009787554/uVol;
  species BPGA13 in uVol = 0.00800852/uVol;
  species Nb in uVol = 9.09694/uVol;
  species Pyr in uVol = 26.0424/uVol;
  species NADH in uVol = 0.010996142/uVol;
  species Pg in uVol = 1.872407/uVol;
  species Pc in uVol = 35.55711/uVol;
  species NAD in uVol = 0.969404814/uVol;
  species $GlcE in uVol = 5/uVol;
  species $PyrE in uVol = 0;
  species $Gly in uVol = 0;

  // Reactions:
  vHK: GlcI + Pg -> Glc6P; (((Vm2_1)*(((GlcI)/(Vg_1))/(K2GlcI_1)))*((((Pg)/(Vg_1)-(((4 )*(KeqAK_1))*(Pg))/(Vg_1)-sumAg_1+(((Pg)/(Vg_1))^(2 )-((4 )*(KeqAK_1))*(((Pg)/(Vg_1))^(2 ))-((2 )*((Pg)/(Vg_1)))*(sumAg_1)+(((8 )*(KeqAK_1))*((Pg)/(Vg_1)))*(sumAg_1)+(sumAg_1)^(2 ))^(0.5 ))/(2 -(8 )*(KeqAK_1)))/(K2ATPg_1)))/((1 +(((Pg)/(Vg_1)-(((4 )*(KeqAK_1))*(Pg))/(Vg_1)-sumAg_1+(((Pg)/(Vg_1))^(2 )-((4 )*(KeqAK_1))*(((Pg)/(Vg_1))^(2 ))-((2 )*((Pg)/(Vg_1)))*(sumAg_1)+(((8 )*(KeqAK_1))*((Pg)/(Vg_1)))*(sumAg_1)+(sumAg_1)^(2 ))^(0.5 ))/(2 -(8 )*(KeqAK_1)))/(K2ATPg_1)+((sumAg_1-(((Pg)/(Vg_1))^(2 )-((4 )*(KeqAK_1))*(((Pg)/(Vg_1))^(2 ))-((2 )*((Pg)/(Vg_1)))*(sumAg_1)+(((8 )*(KeqAK_1))*((Pg)/(Vg_1)))*(sumAg_1)+(sumAg_1)^(2 ))^(0.5 ))/(1 -(4 )*(KeqAK_1)))/(K2ADPg_1))*(1 +((GlcI)/(Vg_1))/(K2GlcI_1)+((Glc6P)/(Vg_1))/(K2Glc6P_1)));
    Vm2_1 = 625; Vg_1 = 0.2451; K2GlcI_1 = 0.1; KeqAK_1 = 0.442; sumAg_1 = 6; K2ATPg_1 = 0.116; K2ADPg_1 = 0.126; K2Glc6P_1 = 12;
  vPGI: Glc6P -> Fru6P; ((Vm3_2)*(((Glc6P)/(Vg_2))/(K3Glc6P_2)-((Fru6P)/(Vg_2))/(K3Fru6P_2)))/(1 +((Glc6P)/(Vg_2))/(K3Glc6P_2)+((Fru6P)/(Vg_2))/(K3Fru6P_2));
    Vm3_2 = 848; Vg_2 = 0.2451; K3Glc6P_2 = 0.4; K3Fru6P_2 = 0.12;
  vPFK: Fru6P + Pg -> Fru16BP; (((Vm4_3)*((K4i1Fru16BP_3)/(K4i1Fru16BP_3+(Fru16BP)/(Vg_3))))*((((Fru6P)/(Vg_3))/(K4Fru6P_3))*((((Pg)/(Vg_3)-((4 )*(KeqAK_3))*((Pg)/(Vg_3))-sumAg_3+(((Pg)/(Vg_3))^(2 )-((4 )*(KeqAK_3))*(((Pg)/(Vg_3))^(2 ))-((2 )*((Pg)/(Vg_3)))*(sumAg_3)+(((8 )*(KeqAK_3))*((Pg)/(Vg_3)))*(sumAg_3)+(sumAg_3)^(2 ))^(0.5 ))/(2 -(8 )*(KeqAK_3)))/(K4ATPg_3))))/((1 +((Fru6P)/(Vg_3))/(K4Fru6P_3)+((Fru16BP)/(Vg_3))/(K4i2Fru16BP_3))*(1 +(((Pg)/(Vg_3)-((4 )*(KeqAK_3))*((Pg)/(Vg_3))-sumAg_3+(((Pg)/(Vg_3))^(2 )-((4 )*(KeqAK_3))*(((Pg)/(Vg_3))^(2 ))-((2 )*((Pg)/(Vg_3)))*(sumAg_3)+(((8 )*(KeqAK_3))*((Pg)/(Vg_3)))*(sumAg_3)+(sumAg_3)^(2 ))^(0.5 ))/(2 -(8 )*(KeqAK_3)))/(K4ATPg_3)));
    Vm4_3 = 780; K4i1Fru16BP_3 = 15.8; Vg_3 = 0.2451; K4Fru6P_3 = 0.82; KeqAK_3 = 0.442; sumAg_3 = 6; K4ATPg_3 = 0.026; K4i2Fru16BP_3 = 10.7;
  vALD: Fru16BP -> DHAP + GAP; (Vm5_4)*(((Vm5f_4)*(((Fru16BP)/(Vg_4))/((0.009 )*(1 +(((Pg)/(Vg_4)-((4 )*(KeqAK_4))*((Pg)/(Vg_4))-sumAg_4+(((Pg)/(Vg_4))^(2 )-((4 )*(KeqAK_4))*(((Pg)/(Vg_4))^(2 ))-((2 )*((Pg)/(Vg_4)))*(sumAg_4)+(((8 )*(KeqAK_4))*((Pg)/(Vg_4)))*(sumAg_4)+(sumAg_4)^(2 ))^(0.5 ))/(2 -(8 )*(KeqAK_4)))/(0.68 )+((sumAg_4-(((Pg)/(Vg_4))^(2 )-((4 )*(KeqAK_4))*(((Pg)/(Vg_4))^(2 ))-((2 )*((Pg)/(Vg_4)))*(sumAg_4)+(((8 )*(KeqAK_4))*((Pg)/(Vg_4)))*(sumAg_4)+(sumAg_4)^(2 ))^(0.5 ))/(1 -(4 )*(KeqAK_4)))/(1.51 )+(((Pg)/(Vg_4)-((4 )*(KeqAK_4))*((Pg)/(Vg_4))-sumAg_4+((8 )*(KeqAK_4))*(sumAg_4)-(((Pg)/(Vg_4))^(2 )-((4 )*(KeqAK_4))*(((Pg)/(Vg_4))^(2 ))-((2 )*((Pg)/(Vg_4)))*(sumAg_4)+(((8 )*(KeqAK_4))*((Pg)/(Vg_4)))*(sumAg_4)+(sumAg_4)^(2 ))^(0.5 ))/(-(2 )+(8 )*(KeqAK_4)))/(3.65 )))-(((Vm5r_4)*((GAP)/(Vg_4)))*(((DHAP)/(Vt_4))*((Vc_4)/(Vg_4)+1 )-(((((DHAPct0_4+Gly3Pct0_4)*((DHAP)/(Vt_4)))*((Vc_4)/(Vg_4)+1 ))/(((DHAPct0_4+Gly3Pct0_4)*(Vc_4))/(Vg_4)+DHAPgt0_4+Gly3Pgt0_4))*(Vc_4))/(Vg_4)))/(((Vm5f_4)*(K5GAP_4))*(K5DHAP_4))))/(1 +((Fru16BP)/(Vg_4))/((0.009 )*(1 +(((Pg)/(Vg_4)-((4 )*(KeqAK_4))*((Pg)/(Vg_4))-sumAg_4+(((Pg)/(Vg_4))^(2 )-((4 )*(KeqAK_4))*(((Pg)/(Vg_4))^(2 ))-((2 )*((Pg)/(Vg_4)))*(sumAg_4)+(((8 )*(KeqAK_4))*((Pg)/(Vg_4)))*(sumAg_4)+(sumAg_4)^(2 ))^(0.5 ))/(2 -(8 )*(KeqAK_4)))/(0.68 )+((sumAg_4-(((Pg)/(Vg_4))^(2 )-((4 )*(KeqAK_4))*(((Pg)/(Vg_4))^(2 ))-((2 )*((Pg)/(Vg_4)))*(sumAg_4)+(((8 )*(KeqAK_4))*((Pg)/(Vg_4)))*(sumAg_4)+(sumAg_4)^(2 ))^(0.5 ))/(1 -(4 )*(KeqAK_4)))/(1.51 )+(((Pg)/(Vg_4)-((4 )*(KeqAK_4))*((Pg)/(Vg_4))-sumAg_4+((8 )*(KeqAK_4))*(sumAg_4)-(((Pg)/(Vg_4))^(2 )-((4 )*(KeqAK_4))*(((Pg)/(Vg_4))^(2 ))-((2 )*((Pg)/(Vg_4)))*(sumAg_4)+(((8 )*(KeqAK_4))*((Pg)/(Vg_4)))*(sumAg_4)+(sumAg_4)^(2 ))^(0.5 ))/(-(2 )+(8 )*(KeqAK_4)))/(3.65 )))+((GAP)/(Vg_4))/(K5GAP_4)+(((DHAP)/(Vt_4))*((Vc_4)/(Vg_4)+1 )-(((((DHAPct0_4+Gly3Pct0_4)*((DHAP)/(Vt_4)))*((Vc_4)/(Vg_4)+1 ))/(((DHAPct0_4+Gly3Pct0_4)*(Vc_4))/(Vg_4)+DHAPgt0_4+Gly3Pgt0_4))*(Vc_4))/(Vg_4))/(K5DHAP_4)+(((Fru16BP)/(Vg_4))*((GAP)/(Vg_4)))/(((0.009 )*(1 +(((Pg)/(Vg_4)-((4 )*(KeqAK_4))*((Pg)/(Vg_4))-sumAg_4+(((Pg)/(Vg_4))^(2 )-((4 )*(KeqAK_4))*(((Pg)/(Vg_4))^(2 ))-((2 )*((Pg)/(Vg_4)))*(sumAg_4)+(((8 )*(KeqAK_4))*((Pg)/(Vg_4)))*(sumAg_4)+(sumAg_4)^(2 ))^(0.5 ))/(2 -(8 )*(KeqAK_4)))/(0.68 )+((sumAg_4-(((Pg)/(Vg_4))^(2 )-((4 )*(KeqAK_4))*(((Pg)/(Vg_4))^(2 ))-((2 )*((Pg)/(Vg_4)))*(sumAg_4)+(((8 )*(KeqAK_4))*((Pg)/(Vg_4)))*(sumAg_4)+(sumAg_4)^(2 ))^(0.5 ))/(1 -(4 )*(KeqAK_4)))/(1.51 )+(((Pg)/(Vg_4)-((4 )*(KeqAK_4))*((Pg)/(Vg_4))-sumAg_4+((8 )*(KeqAK_4))*(sumAg_4)-(((Pg)/(Vg_4))^(2 )-((4 )*(KeqAK_4))*(((Pg)/(Vg_4))^(2 ))-((2 )*((Pg)/(Vg_4)))*(sumAg_4)+(((8 )*(KeqAK_4))*((Pg)/(Vg_4)))*(sumAg_4)+(sumAg_4)^(2 ))^(0.5 ))/(-(2 )+(8 )*(KeqAK_4)))/(3.65 )))*(K5GAPi_4))+(((GAP)/(Vg_4))*(((DHAP)/(Vt_4))*((Vc_4)/(Vg_4)+1 )-(((((DHAPct0_4+Gly3Pct0_4)*((DHAP)/(Vt_4)))*((Vc_4)/(Vg_4)+1 ))/(((DHAPct0_4+Gly3Pct0_4)*(Vc_4))/(Vg_4)+DHAPgt0_4+Gly3Pgt0_4))*(Vc_4))/(Vg_4)))/((K5GAP_4)*(K5DHAP_4))));
    Vm5_4 = 1; Vm5f_4 = 184.5; Vg_4 = 0.2451; KeqAK_4 = 0.442; sumAg_4 = 6; Vm5r_4 = 219.555; Vt_4 = 5.7; Vc_4 = 5.4549; DHAPct0_4 = 4.01536; Gly3Pct0_4 = 0.984642; DHAPgt0_4 = 1.30902; Gly3Pgt0_4 = 0.320997; K5GAP_4 = 0.067; K5DHAP_4 = 0.015; K5GAPi_4 = 0.098;
  vTPI: DHAP -> GAP; ((Vm6_5)*((((DHAP)/(Vt_5))*((Vc_5)/(Vg_5)+1 )-(((((DHAPct0_5+Gly3Pct0_5)*((DHAP)/(Vt_5)))*((Vc_5)/(Vg_5)+1 ))/(((DHAPct0_5+Gly3Pct0_5)*(Vc_5))/(Vg_5)+DHAPgt0_5+Gly3Pgt0_5))*(Vc_5))/(Vg_5))/(K6DHAPg_5)-((5.7 )*((GAP)/(Vg_5)))/(K6GAP_5)))/(1 +(((DHAP)/(Vt_5))*((Vc_5)/(Vg_5)+1 )-(((((DHAPct0_5+Gly3Pct0_5)*((DHAP)/(Vt_5)))*((Vc_5)/(Vg_5)+1 ))/(((DHAPct0_5+Gly3Pct0_5)*(Vc_5))/(Vg_5)+DHAPgt0_5+Gly3Pgt0_5))*(Vc_5))/(Vg_5))/(K6DHAPg_5)+((GAP)/(Vg_5))/(K6GAP_5));
    Vm6_5 = 842; Vt_5 = 5.7; Vc_5 = 5.4549; Vg_5 = 0.2451; DHAPct0_5 = 4.01536; Gly3Pct0_5 = 0.984642; DHAPgt0_5 = 1.30902; Gly3Pgt0_5 = 0.320997; K6DHAPg_5 = 1.2; K6GAP_5 = 0.25;
  vGDH: DHAP + NADH -> NAD + $GlcE; (Vm8_6)*(((Vm8f_6)*(((((DHAP)/(Vt_6))*((Vc_6)/(Vg_6)+1 )-(((((DHAPct0_6+Gly3Pct0_6)*((DHAP)/(Vt_6)))*((Vc_6)/(Vg_6)+1 ))/(((DHAPct0_6+Gly3Pct0_6)*(Vc_6))/(Vg_6)+DHAPgt0_6+Gly3Pgt0_6))*(Vc_6))/(Vg_6))*((NADH)/(Vg_6)))/((K8DHAPg_6)*(K8NADH_6))-((Vm8r_6)/(Vm8f_6))*((((NAD)/(Vg_6))*(DHAPgt0_6+Gly3Pgt0_6-((DHAP)/(Vt_6))*((Vc_6)/(Vg_6)+1 )-(((((DHAPct0_6+Gly3Pct0_6)*((DHAP)/(Vt_6)))*((Vc_6)/(Vg_6)+1 ))/(((DHAPct0_6+Gly3Pct0_6)*(Vc_6))/(Vg_6)+DHAPgt0_6+Gly3Pgt0_6))*(Vc_6))/(Vg_6)))/((K8NAD_6)*(K8Gly3Pg_6)))))/((1 +(((DHAP)/(Vt_6))*((Vc_6)/(Vg_6)+1 )-(((((DHAPct0_6+Gly3Pct0_6)*((DHAP)/(Vt_6)))*((Vc_6)/(Vg_6)+1 ))/(((DHAPct0_6+Gly3Pct0_6)*(Vc_6))/(Vg_6)+DHAPgt0_6+Gly3Pgt0_6))*(Vc_6))/(Vg_6))/(K8DHAPg_6)+(DHAPgt0_6+Gly3Pgt0_6-((DHAP)/(Vt_6))*((Vc_6)/(Vg_6)+1 )-(((((DHAPct0_6+Gly3Pct0_6)*((DHAP)/(Vt_6)))*((Vc_6)/(Vg_6)+1 ))/(((DHAPct0_6+Gly3Pct0_6)*(Vc_6))/(Vg_6)+DHAPgt0_6+Gly3Pgt0_6))*(Vc_6))/(Vg_6))/(K8Gly3Pg_6))*(1 +((NADH)/(Vg_6))/(K8NADH_6)+((NAD)/(Vg_6))/(K8NAD_6))));
    Vm8_6 = 1; Vm8f_6 = 533; Vt_6 = 5.7; Vc_6 = 5.4549; Vg_6 = 0.2451; DHAPct0_6 = 4.01536; Gly3Pct0_6 = 0.984642; DHAPgt0_6 = 1.30902; Gly3Pgt0_6 = 0.320997; K8DHAPg_6 = 0.1; K8NADH_6 = 0.01; Vm8r_6 = 149.24; K8NAD_6 = 0.4; K8Gly3Pg_6 = 2;
  vGPO: $GlcE -> DHAP; ((Vm9_7)*((DHAPct0_7+Gly3Pct0_7-(((DHAPct0_7+Gly3Pct0_7)*((DHAP)/(Vt_7)))*((Vc_7)/(Vg_7)+1 ))/(((DHAPct0_7+Gly3Pct0_7)*(Vc_7))/(Vg_7)+DHAPgt0_7+Gly3Pgt0_7))/(K9Gly3Pc_7)))/(1 +(DHAPct0_7+Gly3Pct0_7-(((DHAPct0_7+Gly3Pct0_7)*((DHAP)/(Vt_7)))*((Vc_7)/(Vg_7)+1 ))/(((DHAPct0_7+Gly3Pct0_7)*(Vc_7))/(Vg_7)+DHAPgt0_7+Gly3Pgt0_7))/(K9Gly3Pc_7));
    Vm9_7 = 368; DHAPct0_7 = 4.01536; Gly3Pct0_7 = 0.984642; Vt_7 = 5.7; Vc_7 = 5.4549; Vg_7 = 0.2451; DHAPgt0_7 = 1.30902; Gly3Pgt0_7 = 0.320997; K9Gly3Pc_7 = 1.7;
  vPyrTr: Pyr -> $PyrE; ((Vm10_8)*(((Pyr)/(Vc_8))/(K10Pyr_8)))/(1 +((Pyr)/(Vc_8))/(K10Pyr_8));
    Vm10_8 = 200; Vc_8 = 5.4549; K10Pyr_8 = 1.96;
  vPGK: BPGA13 -> Nb + Pg; (Vm11_9)*(((Vm11f_9)*((((BPGA13)/(Vg_9))*((sumAg_9-(((Pg)/(Vg_9))^(2 )-((4 )*(KeqAK_9))*(((Pg)/(Vg_9))^(2 ))-((2 )*((Pg)/(Vg_9)))*(sumAg_9)+(((8 )*(KeqAK_9))*((Pg)/(Vg_9)))*(sumAg_9)+(sumAg_9)^(2 ))^(0.5 ))/(1 -(4 )*(KeqAK_9))))/((K11BPGA13_9)*(K11ADPg_9))-((Vm11r_9)/(Vm11f_9))*((((((Nb)/(Vt_9))*(1 +(Vc_9)/(Vg_9)))/(1 +((1 +KeqPGM_9+(KeqPGM_9)*(KeqENO_9))*(Vc_9))/(Vg_9)))*(((Pg)/(Vg_9)-((4 )*(KeqAK_9))*((Pg)/(Vg_9))-sumAg_9+(((Pg)/(Vg_9))^(2 )-((4 )*(KeqAK_9))*(((Pg)/(Vg_9))^(2 ))-((2 )*((Pg)/(Vg_9)))*(sumAg_9)+(((8 )*(KeqAK_9))*((Pg)/(Vg_9)))*(sumAg_9)+(sumAg_9)^(2 ))^(0.5 ))/(2 -(8 )*(KeqAK_9))))/((K11PGA3_9)*(K11ATPg_9)))))/((1 +((BPGA13)/(Vg_9))/(K11BPGA13_9)+((((Nb)/(Vt_9))*(1 +(Vc_9)/(Vg_9)))/(1 +((1 +KeqPGM_9+(KeqPGM_9)*(KeqENO_9))*(Vc_9))/(Vg_9)))/(K11PGA3_9))*(1 +((sumAg_9-(((Pg)/(Vg_9))^(2 )-((4 )*(KeqAK_9))*(((Pg)/(Vg_9))^(2 ))-((2 )*((Pg)/(Vg_9)))*(sumAg_9)+(((8 )*(KeqAK_9))*((Pg)/(Vg_9)))*(sumAg_9)+(sumAg_9)^(2 ))^(0.5 ))/(1 -(4 )*(KeqAK_9)))/(K11ADPg_9)+(((Pg)/(Vg_9)-((4 )*(KeqAK_9))*((Pg)/(Vg_9))-sumAg_9+(((Pg)/(Vg_9))^(2 )-((4 )*(KeqAK_9))*(((Pg)/(Vg_9))^(2 ))-((2 )*((Pg)/(Vg_9)))*(sumAg_9)+(((8 )*(KeqAK_9))*((Pg)/(Vg_9)))*(sumAg_9)+(sumAg_9)^(2 ))^(0.5 ))/(2 -(8 )*(KeqAK_9)))/(K11ATPg_9))));
    Vm11_9 = 1; Vm11f_9 = 640; Vg_9 = 0.2451; sumAg_9 = 6; KeqAK_9 = 0.442; K11BPGA13_9 = 0.05; K11ADPg_9 = 0.1; Vm11r_9 = 18.56; Vt_9 = 5.7; Vc_9 = 5.4549; KeqPGM_9 = 0.187; KeqENO_9 = 6.7; K11PGA3_9 = 1.62; K11ATPg_9 = 0.29;
  vPK: Nb -> Pyr + Pc; (((Vm12_10)*((((((((Nb)/(Vt_10))*(1 +(Vc_10)/(Vg_10)))/(1 +((1 +KeqPGM_10+(KeqPGM_10)*(KeqENO_10))*(Vc_10))/(Vg_10)))*(KeqPGM_10))*(KeqENO_10))/((0.34 )*(1 +(((Pc)/(Vc_10)-((4 )*(KeqAK_10))*((Pc)/(Vc_10))-sumAc_10+(((Pc)/(Vc_10))^(2 )-((4 )*(KeqAK_10))*(((Pc)/(Vc_10))^(2 ))-((2 )*((Pc)/(Vc_10)))*(sumAc_10)+(((8 )*(KeqAK_10))*((Pc)/(Vc_10)))*(sumAc_10)+(sumAc_10)^(2 ))^(0.5 ))/(2 -(8 )*(KeqAK_10)))/(0.57 )+((sumAc_10-(((Pc)/(Vc_10))^(2 )-((4 )*(KeqAK_10))*(((Pc)/(Vc_10))^(2 ))-((2 )*((Pc)/(Vc_10)))*(sumAc_10)+(((8 )*(KeqAK_10))*((Pc)/(Vc_10)))*(sumAc_10)+(sumAc_10)^(2 ))^(0.5 ))/(1 -(4 )*(KeqAK_10)))/(0.64 ))))^(n12_10)))*(((sumAc_10-(((Pc)/(Vc_10))^(2 )-((4 )*(KeqAK_10))*(((Pc)/(Vc_10))^(2 ))-((2 )*((Pc)/(Vc_10)))*(sumAc_10)+(((8 )*(KeqAK_10))*((Pc)/(Vc_10)))*(sumAc_10)+(sumAc_10)^(2 ))^(0.5 ))/(1 -(4 )*(KeqAK_10)))/(K12ADP_10)))/((1 +(((((((Nb)/(Vt_10))*(1 +(Vc_10)/(Vg_10)))/(1 +((1 +KeqPGM_10+(KeqPGM_10)*(KeqENO_10))*(Vc_10))/(Vg_10)))*(KeqPGM_10))*(KeqENO_10))/((0.34 )*(1 +(((Pc)/(Vc_10)-((4 )*(KeqAK_10))*((Pc)/(Vc_10))-sumAc_10+(((Pc)/(Vc_10))^(2 )-((4 )*(KeqAK_10))*(((Pc)/(Vc_10))^(2 ))-((2 )*((Pc)/(Vc_10)))*(sumAc_10)+(((8 )*(KeqAK_10))*((Pc)/(Vc_10)))*(sumAc_10)+(sumAc_10)^(2 ))^(0.5 ))/(2 -(8 )*(KeqAK_10)))/(0.57 )+((sumAc_10-(((Pc)/(Vc_10))^(2 )-((4 )*(KeqAK_10))*(((Pc)/(Vc_10))^(2 ))-((2 )*((Pc)/(Vc_10)))*(sumAc_10)+(((8 )*(KeqAK_10))*((Pc)/(Vc_10)))*(sumAc_10)+(sumAc_10)^(2 ))^(0.5 ))/(1 -(4 )*(KeqAK_10)))/(0.64 ))))^(n12_10))*(1 +((sumAc_10-(((Pc)/(Vc_10))^(2 )-((4 )*(KeqAK_10))*(((Pc)/(Vc_10))^(2 ))-((2 )*((Pc)/(Vc_10)))*(sumAc_10)+(((8 )*(KeqAK_10))*((Pc)/(Vc_10)))*(sumAc_10)+(sumAc_10)^(2 ))^(0.5 ))/(1 -(4 )*(KeqAK_10)))/(K12ADP_10)));
    Vm12_10 = 2600; Vt_10 = 5.7; Vc_10 = 5.4549; Vg_10 = 0.2451; KeqPGM_10 = 0.187; KeqENO_10 = 6.7; KeqAK_10 = 0.442; sumAc_10 = 3.9; n12_10 = 2.5; K12ADP_10 = 0.114;
  vATPase: Pc -> $GlcE; ((K13_11)*(((Pc)/(Vc_11)-((4 )*(KeqAK_11))*((Pc)/(Vc_11))-sumAc_11+(((Pc)/(Vc_11))^(2 )-((4 )*(KeqAK_11))*(((Pc)/(Vc_11))^(2 ))-((2 )*((Pc)/(Vc_11)))*(sumAc_11)+(((8 )*(KeqAK_11))*((Pc)/(Vc_11)))*(sumAc_11)+(sumAc_11)^(2 ))^(0.5 ))/(2 -(8 )*(KeqAK_11))))/((sumAc_11-(((Pc)/(Vc_11))^(2 )-((4 )*(KeqAK_11))*(((Pc)/(Vc_11))^(2 ))-((2 )*((Pc)/(Vc_11)))*(sumAc_11)+(((8 )*(KeqAK_11))*((Pc)/(Vc_11)))*(sumAc_11)+(sumAc_11)^(2 ))^(0.5 ))/(1 -(4 )*(KeqAK_11)));
    K13_11 = 50; Vc_11 = 5.4549; KeqAK_11 = 0.442; sumAc_11 = 3.9;
  vGlyK: $GlcE -> Pg + $Gly; (Vm14_12)*(((Vm14f_12)*(((DHAPgt0_12+Gly3Pgt0_12-((DHAP)/(Vt_12))*((Vc_12)/(Vg_12)+1 )-(((((DHAPct0_12+Gly3Pct0_12)*((DHAP)/(Vt_12)))*((Vc_12)/(Vg_12)+1 ))/(((DHAPct0_12+Gly3Pct0_12)*(Vc_12))/(Vg_12)+DHAPgt0_12+Gly3Pgt0_12))*(Vc_12))/(Vg_12))*((sumAg_12-(((Pg)/(Vg_12))^(2 )-((4 )*(KeqAK_12))*(((Pg)/(Vg_12))^(2 ))-((2 )*((Pg)/(Vg_12)))*(sumAg_12)+(((8 )*(KeqAK_12))*((Pg)/(Vg_12)))*(sumAg_12)+(sumAg_12)^(2 ))^(0.5 ))/(1 -(4 )*(KeqAK_12))))/((K14Gly3Pg_12)*(K14ADPg_12)))-(Vm14r_12)*(((Gly)*(((Pg)/(Vg_12)-((4 )*(KeqAK_12))*((Pg)/(Vg_12))-sumAg_12+(((Pg)/(Vg_12))^(2 )-((4 )*(KeqAK_12))*(((Pg)/(Vg_12))^(2 ))-((2 )*((Pg)/(Vg_12)))*(sumAg_12)+(((8 )*(KeqAK_12))*((Pg)/(Vg_12)))*(sumAg_12)+(sumAg_12)^(2 ))^(0.5 ))/(2 -(8 )*(KeqAK_12))))/((K14Gly_12)*(K14ATPg_12))))/((1 +(DHAPgt0_12+Gly3Pgt0_12-((DHAP)/(Vt_12))*((Vc_12)/(Vg_12)+1 )-(((((DHAPct0_12+Gly3Pct0_12)*((DHAP)/(Vt_12)))*((Vc_12)/(Vg_12)+1 ))/(((DHAPct0_12+Gly3Pct0_12)*(Vc_12))/(Vg_12)+DHAPgt0_12+Gly3Pgt0_12))*(Vc_12))/(Vg_12))/(K14Gly3Pg_12)+(Gly)/(K14Gly_12))*(1 +((sumAg_12-(((Pg)/(Vg_12))^(2 )-((4 )*(KeqAK_12))*(((Pg)/(Vg_12))^(2 ))-((2 )*((Pg)/(Vg_12)))*(sumAg_12)+(((8 )*(KeqAK_12))*((Pg)/(Vg_12)))*(sumAg_12)+(sumAg_12)^(2 ))^(0.5 ))/(1 -(4 )*(KeqAK_12)))/(K14ADPg_12)+(((Pg)/(Vg_12)-((4 )*(KeqAK_12))*((Pg)/(Vg_12))-sumAg_12+(((Pg)/(Vg_12))^(2 )-((4 )*(KeqAK_12))*(((Pg)/(Vg_12))^(2 ))-((2 )*((Pg)/(Vg_12)))*(sumAg_12)+(((8 )*(KeqAK_12))*((Pg)/(Vg_12)))*(sumAg_12)+(sumAg_12)^(2 ))^(0.5 ))/(2 -(8 )*(KeqAK_12)))/(K14ATPg_12))));
    Vm14_12 = 1; Vm14f_12 = 200; DHAPgt0_12 = 1.30902; Gly3Pgt0_12 = 0.320997; Vt_12 = 5.7; Vc_12 = 5.4549; Vg_12 = 0.2451; DHAPct0_12 = 4.01536; Gly3Pct0_12 = 0.984642; sumAg_12 = 6; KeqAK_12 = 0.442; K14Gly3Pg_12 = 5.1; K14ADPg_12 = 0.12; Vm14r_12 = 33400; K14Gly_12 = 0.12; K14ATPg_12 = 0.19;
  vGlcTr: $GlcE -> GlcI; ((Vm1_13)*(GlcE-(GlcI)/(Vg_13)))/(K1Glc_13+GlcE+(GlcI)/(Vg_13)+(((afac_13)*(GlcE))*((GlcI)/(Vg_13)))/(K1Glc_13));
    Vm1_13 = 106.2; Vg_13 = 0.2451; K1Glc_13 = 2; afac_13 = 0.75;
  vGAPdh: GAP + NAD -> BPGA13 + NADH; (((Vm7_14)*(Vm7f_14))*((((GAP)/(Vg_14))*((NAD)/(Vg_14)))/((K7GAP_14)*(K7NAD_14))-((Vm7r_14)/(Vm7f_14))*((((BPGA13)/(Vg_14))*((NADH)/(Vg_14)))/((K7BPGA13_14)*(K7NADH_14)))))/((1 +((GAP)/(Vg_14))/(K7GAP_14)+((BPGA13)/(Vg_14))/(K7BPGA13_14))*(1 +((NAD)/(Vg_14))/(K7NAD_14)+((NADH)/(Vg_14))/(K7NADH_14)));
    Vm7_14 = 1; Vm7f_14 = 1470; Vg_14 = 0.2451; K7GAP_14 = 0.15; K7NAD_14 = 0.45; Vm7r_14 = 984.9; K7BPGA13_14 = 0.1; K7NADH_14 = 0.02;
end
