// SBML level 1 version 2
// Author:         Andrew Finney
//   Organisation:   SBMLTeam (http://sbml.org)
//   (C) 2004 - 2005 California Institute of Technology and University of Hertfordshire
//   This is free software;
//   see the file "LICENSE.txt" or the URL http://sbml.org/software/LICENSE.html
//   for licensing and distribution terms.

model basic_model1_noeffect()

  // Compartments:
  compartment compartment = 1;

  // Species:
  species S1 in compartment = 1.5e-15/compartment;
  species S2 in compartment = 1.5e-15/compartment;

  // Reactions:
  R1: S1 => S2; k_1 * S1;
    k_1 = 0.5;
  R2: S2 => S1; k_2 * S2;
    k_2 = 0.5;
end
