// SBML level 1 version 2
// Author:         Andrew Finney
//   Organisation:   SBMLTeam (http://sbml.org)
//   (C) 2004 - 2005 California Institute of Technology and University of Hertfordshire
//   This is free software;
//   see the file "LICENSE.txt" or the URL http://sbml.org/software/LICENSE.html
//   for licensing and distribution terms.

model basic_model2_boundaryABC()

  // Compartments:
  compartment c = 1;

  // Species:
  species $A in c = 1e-15/c;
  species $B in c = 2e-15/c;
  species $C in c = 1e-15/c;

  // Reactions:
  R1: $A + $B => $C; kf * A * B;
    kf = 0.75;
  R2: $C => $A + $B; kr * C;
    kr = 0.25;
end
