// SBML level 1 version 1
// Author:         Andrew Finney
//   Organisation:   SBMLTeam (http://sbml.org)
//   (C) 2004 - 2005 California Institute of Technology and University of Hertfordshire
//   This is free software;
//   see the file "LICENSE.txt" or the URL http://sbml.org/software/LICENSE.html
//   for licensing and distribution terms.
// Model Starts Here

model basic_model4_base()

  // Compartments:
  compartment compartment = 1;
  compartment c = 1;

  // Species:
  species S1 in c = 1e-15/c;
  species S2 in c = 2e-15/c;
  species S3 in c = 0;
  species S4 in c = 0;

  // Reactions:
  R1: S1 => S2; k1f*S1;
    k1f = 0.75;
  R2: S2 => S1; k1r*S2;
    k1r = 0.25;
  R3: S2 => S3 + S4; k2f*S2;
    k2f = 0.15;
  R4: S3 + S4 => S2; k2r*S3*S4;
    k2r = 0.1;
end
