// SBML level 1 version 1
// Author:         Andrew Finney
//   Organisation:   SBMLTeam (http://sbml.org)
//   (C) 2004 - 2005 California Institute of Technology and University of Hertfordshire
//   This is free software;
//   see the file "LICENSE.txt" or the URL http://sbml.org/software/LICENSE.html
//   for licensing and distribution terms.
// Model Starts Here

model basic_model5_base()

  // Compartments:
  compartment compartment = 1;

  // Species:
  species A in compartment = 2e-15/compartment;
  species B in compartment = 2e-15/compartment;
  species C in compartment = 0;
  species D in compartment = 0;

  // Reactions:
  J0: A + B => C; kf*A*B;
    kf = 1e15;
  J1: C => A + B; kr*C;
    kr = 0.9;
  J2: C => D + A; k2*C;
    k2 = 0.7;
end
