// SBML level 1 version 1
// Author:         Andrew Finney
//   Organisation:   SBMLTeam (http://sbml.org)
//   (C) 2004 - 2005 California Institute of Technology and University of Hertfordshire
//   This is free software;
//   see the file "LICENSE.txt" or the URL http://sbml.org/software/LICENSE.html
//   for licensing and distribution terms.
// Model Starts Here

model basic_model6_base()

  // Compartments:
  compartment compartment = 1;

  // Species:
  species A in compartment = 2e-15/compartment;
  species B in compartment = 1e-15/compartment;
  species C in compartment = 5e-16/compartment;
  species D in compartment = 0;

  // Reactions:
  J0: A => B; k1*A;
    k1 = 0.7;
  J1: B => C; k2*B;
    k2 = 0.5;
  J2: C => D; k3*C;
    k3 = 1;
end
