// SBML level 2 version 1
// Author:         Andrew Finney
//   Organisation:   SBMLTeam (http://sbml.org)
//   (C) 2004 - 2005 California Institute of Technology and University of Hertfordshire
//   This is free software;
//   see the file "LICENSE.txt" or the URL http://sbml.org/software/LICENSE.html
//   for licensing and distribution terms.

model discontinuityTimeAndDelay_and()

  // Compartments:
  compartment c = 1;

  // Species:
  species s1 in c = 10/c;
  species s2 in c = 0;
  species s3 in c = 10/c;
  species s4 in c = 0;

  // Parameters:
  p = 1;

  // Reactions:
  r1: s1 -> s2; s1*p;
  r2: s3 -> s4; piecewise(1.5, (s2 > 4) && (s1 < 5) && (s2 < 8), 0.05);  // modifiers: s2
end
