// SBML level 2 version 1
// Author:         Andrew Finney
//   Organisation:   SBMLTeam (http://sbml.org)
//   (C) 2004 - 2005 California Institute of Technology and University of Hertfordshire
//   This is free software;
//   see the file "LICENSE.txt" or the URL http://sbml.org/software/LICENSE.html
//   for licensing and distribution terms.

model events_complex_trigger()

  // Compartments:
  compartment compartment = 1;

  // Species:
  species S1 in compartment = 1/compartment;
  species S2 in compartment = 0;
  species S3 in compartment = 0;

  // Parameters:
  p = 1;

  // Reactions:
  R: S1 => S2; S1*p;

  // Events:
  at (S1 < 0.1): S1 = 1;
  at (S2 > 0.5): S2 = 0;
  at ((S2 > 0.2) && (S1 < 0.2)): S3 = 0.75;
end
