// SBML level 2 version 1
// Author:         Andrew Finney
//   Organisation:   SBMLTeam (http://sbml.org)
//   (C) 2004 - 2005 California Institute of Technology and University of Hertfordshire
//   This is free software;
//   see the file "LICENSE.txt" or the URL http://sbml.org/software/LICENSE.html
//   for licensing and distribution terms.

function f(x)
  x < 0.1;
end

model functions_trigger()

  // Compartments:
  compartment compartment = 1;

  // Species:
  species S1 in compartment = 1/compartment;
  species S2 in compartment = 0;

  // Parameters:
  p = 1;

  // Reactions:
  R: S1 => S2; S1*p;

  // Events:
  at (f(S1)): S1 = 1;
end
