// SBML level 1 version 1
// Author:         Andrew Finney
//   Organisation:   SBMLTeam (http://sbml.org)
//   (C) 2004 - 2005 California Institute of Technology and University of Hertfordshire
//   This is free software;
//   see the file "LICENSE.txt" or the URL http://sbml.org/software/LICENSE.html
//   for licensing and distribution terms.

model parameterNamespace_global()

  // Compartments:
  compartment compartment = 1;

  // Species:
  species S1 in compartment = 3e-15/compartment;
  species S2 in compartment = 0;
  species S3 in compartment = 0;

  // Parameters:
  k_1 = 1;
  k_2 = 0.1;

  // Reactions:
  R1: S1 => S2; k_1*S1;
  R2: S2 => S3; k_2*S2;
end
