// SBML level 2 version 1
// Author:         Andrew Finney
//   Organisation:   SBMLTeam (http://sbml.org)
//   (C) 2004 - 2005 California Institute of Technology and University of Hertfordshire
//   This is free software;
//   see the file "LICENSE.txt" or the URL http://sbml.org/software/LICENSE.html
//   for licensing and distribution terms.

model rulesForParametersAndCompartments_reactionUsedInAssignment_Compartment()

  // Compartments:
  compartment c;

  // Species:
  species s1 in c = 10/c;
  species s2 in c = 0;

  // Parameters:
  p = 1;

  // Assignment rules:
  c := 5 + s1*p;

  // Reactions:
  r: s1 -> s2; 5 + s1*p;
end
