// SBML level 1 version 2
// Author:         Andrew Finney
//   Organisation:   SBMLTeam (http://sbml.org)
//   (C) 2004 - 2005 California Institute of Technology and University of Hertfordshire
//   This is free software;
//   see the file "LICENSE.txt" or the URL http://sbml.org/software/LICENSE.html
//   for licensing and distribution terms.

model rulesForParametersAndCompartments_reactionUsedInDifferential_Parameter()

  // Compartments:
  compartment c = 1;

  // Species:
  species s1 in c = 0;
  species $s2 in c;

  // Parameters:
  p = 0;

  // Assignment rules:
  s2 := p;

  // Rate rules:
  p' = 10 * s1;

  // Reactions:
  r: s1 -> $s2; 5 * s1;
end
